ORIGIN := 1
t := runif(100, 0, 1)
iy := -1023
Urand(iy) :=
    m2 ← 1073741824
    halfm ← m2
    mic ← halfm*atan(1.0)
    ib ← mod(mic, 8)
    ib ← mic - ib + 5
    mic ← halfm*(1 - 1/sqrt(3))
    iθ ← mod(mic, 2)
    iθ ← mic - iθ + 1
    s ← 0.5/halfm
    iy ← iy*ib + iθ
    iy ← mod(iy, 2147483648)
    iy ← (iy + m2) + m2 if iy < 0
    iy ← (iy - m2) - m2 if iy/2 > m2
    while iy > 2147483648
        iy ← iy - 2147483648
    u ← iy*s
    u
MassUrand(iy, k) :=
    for i ∈ 1 .. k
        u[i] ← Urand(iy)
        iy ← u[i]*2147483648
    u
k := Urand(iy)
k = 0.480162
k1 := Urand(k)
k1 = 0.399884
d := MassUrand(iy, 100)
d = [
    0.480162; 0.0410567; 0.224625; 0.749139; 0.603226; 0.842525; 0.306551; 0.38124; 0.269119; 0.637852
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]
# Моделирование геометрического распределения:
p := 0.5
i := 1 .. 100
GEOM[i] := ln(d[i])/ln(1 - p)
transpose(GEOM) = [
    1.05841, 4.60624, 2.15441, 0.416695, 0.72923, 0.247208, 1.7058, 1.39123, 1.89369, 0.648706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]
mean(GEOM) = 1.30096
geommin := min(GEOM) = 0.0176605
geommax := max(GEOM) = 6.4219
R := geommax - geommin = 6.40424
GEOM := sort(GEOM)
m := 20
L := R/m
i := 1 .. m
int[i] := geommin + L/2*(2*i - 1)
h := hist(int, GEOM)
i := 1 .. m - 1
h[i] := h[i]/100
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# Генерирование выборки с помощью встроенной функции:
GEOM1 := rexp(100, p)
mean(GEOM1) = 2.31745
geom1min := min(GEOM1) = 0.010034
geom1max := max(GEOM1) = 14.0836
R1 := geom1max - geom1min = 14.0736
GEOM1 := sort(GEOM1)
m := 20
L1 := R/m
i := 1 .. m
int1[i] := geom1min + L1/2*(2*i - 1)
h1 := hist(int1, GEOM1)
i := 1 .. m - 1
h1[i] := h1[i]/100
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