ORIGIN := 1
n := 100
p := 0.1
n := 100
t := rgeom(n, p)
Mx := mean(t)
Dx := var(t)
Mx = 9.29
σx := sqrt(Dx)
Dx = 128.326
t = [
    63; 15; 5; 9; 1; 16; 3; 11; 22; 18
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]
σx = 11.3281
p1 := 1/(Mx + 1)
p1 = 0.0971817
LnL(p) := n*ln(p) + ln(1 - p)*sum(t[i], i = 1 .. n)
i := 1 .. 99
y[i] := LnL(i*0.01)
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k := 1 .. 100
p1 := n/sum(t[i], i = 1 .. n)
p1 := n/(n + sum(t[i], i = 1 .. n))
p1 = 0.0971817
k := 1 .. 99
p1(k) := k/(k + sum(t[i], i = 1 .. k))
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mx := mean(t)
dx := var(t)
δx := sqrt(dx)
mx = 9.29
dx = 128.326
δx = 11.3281
β := 0.95
t1 := qnorm((1 + β)/2, 0, 1)
t1 = 1.95996
ε := sqrt(dx/δx)
Mx1 := mx - ε
Mx2 := mx + ε
Mx1 = 5.92428
Mx2 = 12.6557
ε1 := sqrt(2/(n - 1))*dx*t1
ε1 = 35.7487
dx1 := dx - ε1
dx2 := ε + dx
dx1 = 92.5772
dx2 = 131.692
