ORIGIN := 1
n := 10
k := 21
Ksi[1] := 0.09
Ksi[2] := 2.96
Ksi[3] := 6.45
Ksi[4] := 9.78
Ksi[5] := 13.51
Ksi[6] := 14.85
Ksi[7] := 11.06
Ksi[8] := 8.02
Ksi[9] := 4.21
Ksi[10] := 1.57
Ksi = [0.09; 2.96; 6.45; 9.78; 13.51; 14.85; 11.06; 8.02; 4.21; 1.57]
P := [
    0.15, 0.25, 0.23, 0.20, 0.10, 0.05, 0.02, 0, 0, 0;
    0, 0.15, 0.05, 0.06, 0.07, 0.08, 0.10, 0.15, 0.16, 0.18;
    0, 0, 0.15, 0.15, 0.16, 0.17, 0.05, 0.18, 0.14, 0;
    0.10, 0.10, 0.05, 0.15, 0.05, 0.15, 0.10, 0.10, 0.15, 0.05;
    0, 0.04, 0.11, 0.10, 0.15, 0.10, 0.11, 0.12, 0.13, 0.14;
    0, 0, 0, 0.10, 0, 0.15, 0.25, 0.25, 0.15, 0.10;
    0, 0.20, 0, 0, 0.20, 0, 0.15, 0.25, 0.10, 0.10;
    0.10, 0, 0, 0.20, 0, 0.15, 0, 0.15, 0.25, 0.15;
    0, 0, 0.25, 0, 0.15, 0, 0.15, 0, 0.15, 0.30;
    0, 0, 0, 0.25, 0, 0.25, 0, 0.25, 0, 0.25
]
pp[1, 1] := 0.33
pp[2, 1] := 0
pp[3, 1] := 0
pp[4, 1] := 0
pp[5, 1] := 0.33
pp[6, 1] := 0
pp[7, 1] := 0
pp[8, 1] := 0
pp[9, 1] := 0
pp[10, 1] := 0.34
i := 1 .. n
j := 2 .. k + 1
pp[i, j] := sum(pp[m, j - 1]*P[m, i], m = 1 .. n)
pp = [
    0.33, 0.0495, 0.007425, 0.00111375, 0.000167062, 2.50594e-5, 3.75891e-6, 5.63836e-7, 8.45754e-8, 1.26863e-8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;
    0, 0.0957, 0.02673, 0.00586575, 0.0011583, 0.000215511, 3.85914e-5, 6.72844e-6, 1.15023e-6, 1.93678e-7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;
    0, 0.1122, 0.033, 0.00799425, 0.00174859, 0.000358628, 7.03333e-5, 1.33441e-5, 2.46772e-6, 4.47122e-7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;
    0, 0.184, 0.060072, 0.0170496, 0.00433127, 0.00101489, 0.00022397, 4.72128e-5, 9.60001e-6, 1.89609e-6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;
    0.33, 0.0825, 0.051176, 0.0185736, 0.00543958, 0.00141006, 0.000337226, 7.6113e-5, 1.644e-5, 3.42981e-6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;
    0, 0.1345, 0.08523, 0.0350325, 0.0115537, 0.00332497, 0.000871446, 0.000213267, 4.95182e-5, 1.10275e-5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;
    0, 0.0429, 0.083705, 0.0499713, 0.0210105, 0.00727806, 0.00221953, 0.000617734, 0.000160422, 3.94513e-5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;
    0, 0.1246, 0.125891, 0.0832152, 0.0399859, 0.0157133, 0.00537533, 0.00166036, 0.00047407, 0.000127145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;
    0, 0.0429, 0.131395, 0.0968975, 0.0526202, 0.0235106, 0.00910168, 0.00315521, 0.00100206, 0.000296402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;
    0.34, 0.1312, 0.120076, 0.120194, 0.0846091, 0.0473792, 0.0226022, 0.00956181, 0.0036834, 0.00131656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]
uporjad(x) :=
    n ← rows(x)
    for i ∈ 1 .. n - 1
        for j ∈ i + 1 .. n
            a ← x[i]
            if x[j] < x[i]
                x[i] ← x[j]
                x[j] ← a
    x
x := uporjad(pp[:, 2])
rjadraspred(p, x) :=
    n ← rows(p)
    for i ∈ 1 .. n
        γ ← rnd(1)
        a ← 0
        for j ∈ 1 .. n
            a ← a + p[j]
            if γ < a
                y[i] ← x[j]
                break
    y
y := rjadraspred(x, Ksi)
x = [0.0429; 0.0429; 0.0495; 0.0825; 0.0957; 0.1122; 0.1246; 0.1312; 0.1345; 0.184]
y = [8.02; 8.02; 13.51; 0.09; 2.96; 1.57; 4.21; 4.21; 11.06; 9.78]
tcschepmarkova(k, pp, Ksi) :=
    for i ∈ 1 .. k
        x ← pp[:, i + 1]
        y ← uporjad(x)
        z ← rjadraspred(y, Ksi)
        xx[:, i] ← z
    xx
zz := tcschepmarkova(k, pp, Ksi)
zz = [
    4.21, 14.85, 13.51, 0, 0, 0, 0, 0, 0, 0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;
    0.09, 0, 8.02, 0, 0, 0, 0, 0, 0, 0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;
    8.02, 0, 8.02, 0, 0, 0, 0, 0, 0, 0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;
    2.96, 9.78, 0, 0, 0, 0, 0, 0, 0, 0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;
    1.57, 13.51, 8.02, 0, 0, 0, 0, 0, 0, 0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;
    13.51, 0, 0, 8.02, 0, 0, 0, 0, 0, 0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;
    1.57, 14.85, 0, 0, 0, 0, 0, 0, 0, 0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;
    13.51, 0.09, 0, 1.57, 0, 0, 0, 0, 0, 0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;
    14.85, 9.78, 8.02, 0, 4.21, 0, 0, 0, 0, 0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;
    13.51, 11.06, 0, 0, 0, 0, 0, 0, 0, 0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]
i := 1 .. k
t[i] := i
z := transpose(zz)
z = [
    4.21, 0.09, 8.02, 2.96, 1.57, 13.51, 1.57, 13.51, 14.85, 13.51;
    14.85, 0, 0, 9.78, 13.51, 0, 14.85, 0.09, 9.78, 11.06;
    13.51, 8.02, 8.02, 0, 8.02, 0, 0, 0, 8.02, 0;
    0, 0, 0, 0, 0, 8.02, 0, 1.57, 0, 0;
    0, 0, 0, 0, 0, 0, 0, 0, 4.21, 0;
    0, 0, 0, 0, 0, 0, 0, 0, 0, 0;
    0, 0, 0, 0, 0, 0, 0, 0, 0, 0;
    0, 0, 0, 0, 0, 0, 0, 0, 0, 0;
    0, 0, 0, 0, 0, 0, 0, 0, 0, 0;
    0, 0, 0, 0, 0, 0, 0, 0, 0, 0;
    0, 0, 0, 0, 0, 0, 0, 0, 0, 0;
    0, 0, 0, 0, 0, 0, 0, 0, 0, 0;
    0, 0, 0, 0, 0, 0, 0, 0, 0, 0;
    0, 0, 0, 0, 0, 0, 0, 0, 0, 0;
    0, 0, 0, 0, 0, 0, 0, 0, 0, 0;
    0, 0, 0, 0, 0, 0, 0, 0, 0, 0;
    0, 0, 0, 0, 0, 0, 0, 0, 0, 0;
    0, 0, 0, 0, 0, 0, 0, 0, 0, 0;
    0, 0, 0, 0, 0, 0, 0, 0, 0, 0;
    0, 0, 0, 0, 0, 0, 0, 0, 0, 0;
    0, 0, 0, 0, 0, 0, 0, 0, 0, 0
]
table(z, eps) :=
    k ← rows(z)
    n ← cols(z)
    for i ∈ 1 .. k
        m ← 0
        for j ∈ 2 .. n
            m ← m + 1
            a ← z[i, j - 1]
            if |a - z[i, j]| < 10^-3
                (γ ← rnd(1))
                a ← -a if γ < 0.5
                z[i, j - 1] ← z[i, j - 1] + a*m*eps
            if j == n
                m ← m + 1
                z[i, j] ← z[i, j] - a*m*eps
    z
z := table(z, 0.01)
z = [
    4.21, 0.09, 8.02, 2.96, 1.57, 13.51, 1.57, 13.51, 14.85, 12.025;
    14.85, 0, 0, 9.78, 13.51, 0, 14.85, 0.09, 9.78, 10.082;
    13.51, 7.8596, 8.02, 0, 8.02, 0, 0, 0, 8.02, -0.802;
    0, 0, 0, 0, 0, 8.02, 0, 1.57, 0, 0;
    0, 0, 0, 0, 0, 0, 0, 0, 4.21, -0.421;
    0, 0, 0, 0, 0, 0, 0, 0, 0, 0;
    0, 0, 0, 0, 0, 0, 0, 0, 0, 0;
    0, 0, 0, 0, 0, 0, 0, 0, 0, 0;
    0, 0, 0, 0, 0, 0, 0, 0, 0, 0;
    0, 0, 0, 0, 0, 0, 0, 0, 0, 0;
    0, 0, 0, 0, 0, 0, 0, 0, 0, 0;
    0, 0, 0, 0, 0, 0, 0, 0, 0, 0;
    0, 0, 0, 0, 0, 0, 0, 0, 0, 0;
    0, 0, 0, 0, 0, 0, 0, 0, 0, 0;
    0, 0, 0, 0, 0, 0, 0, 0, 0, 0;
    0, 0, 0, 0, 0, 0, 0, 0, 0, 0;
    0, 0, 0, 0, 0, 0, 0, 0, 0, 0;
    0, 0, 0, 0, 0, 0, 0, 0, 0, 0;
    0, 0, 0, 0, 0, 0, 0, 0, 0, 0;
    0, 0, 0, 0, 0, 0, 0, 0, 0, 0;
    0, 0, 0, 0, 0, 0, 0, 0, 0, 0
]
Ksi1 := z[:, 1]
Ksi2 := z[:, 2]
Ksi3 := z[:, 3]
Ksi4 := z[:, 4]
Ksi5 := z[:, 5]
Ksi6 := z[:, 6]
Ksi7 := z[:, 7]
Ksi8 := z[:, 8]
Ksi9 := z[:, 9]
Ksi10 := z[:, 10]
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