ORIGIN := 1
t := runif(100, 0, 1)
iy := -1023
Urand(iy) :=
    m2 ← 1073741824
    halfm ← m2
    mic ← halfm*atan(1.0)
    ib ← mod(mic, 8)
    ib ← mic - ib + 5
    mic ← halfm*(1 - 1/sqrt(3))
    iθ ← mod(mic, 2)
    iθ ← mic - iθ + 1
    s ← 0.5/halfm
    iy ← iy*ib + iθ
    iy ← mod(iy, 2147483648)
    iy ← (iy + m2) + m2 if iy < 0
    iy ← (iy - m2) - m2 if iy/2 > m2
    while iy > 2147483648
        iy ← iy - 2147483648
    u ← iy*s
    u
MassUrand(iy, k) :=
    for i ∈ 1 .. k
        u[i] ← Urand(iy)
        iy ← u[i]*2147483648
    u
k := Urand(iy)
k = 0.480162
k1 := Urand(k)
k1 = 0.399884
d := MassUrand(iy, 100)
d = [
    0.480162; 0.0410567; 0.224625; 0.749139; 0.603226; 0.842525; 0.306551; 0.38124; 0.269119; 0.637852
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]
σ := 7
m := 3
i := 1 .. 100
x[i] := m*e^(σ*sum(d[i], i = 1 .. 12) - 6)
x = [
    6.77829e14; 6.77829e14; 6.77829e14; 6.77829e14; 6.77829e14; 6.77829e14; 6.77829e14; 6.77829e14; 6.77829e14; 6.77829e14
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]
