ORIGIN := 1
N := 100
n1 := 1
n2 := 1
d := rbeta(N, n1, n2)
Mx := mean(d)
Mx = 0.514527
Dx := var(d)
δx := sqrt(Dx)
Dx = 0.0819423
δx = 0.286256
L(x, s1, s2) := product(Γ(s1 + s2)/(Γ(s1)*Γ(s2))*d[i]^(s1 - 1)*(1 - d[i])^(s2 - 1), i = 1 .. N)
Γ(s1 + s2)^n/(Γ(s1)^n*Γ(s2)^n)*product(d[i]^(s1 - 1)*(1 - d[i])^(s2 - 1), i = 1 .. N)
L(d, n1, n2) = 1
LnL(s1, s2) := ln(L(d, n1, n2))
n*ln(Γ(s1 + s2)/(Γ(s1)*Γ(s2))) + sum(ln(d[i]^(s1 - 1)*(1 - d[i])^(s2 - 1)), i = 1 .. N)
LnL(n1, n2) = 0
β := 0.99
t1 := qbeta((1 + β)/2, n1, n2)
t1 = 0.995
ε := sqrt(Dx/N)*t1
Mxl := Mx - ε
Mxr := Mx + ε
Mxl = 0.486045
Mxr = 0.54301
n*ln(Γ(s1 + s2)/(Γ(s1)*Γ(s2))) + sum(ln(d[i]^(s1 - 1)), i = 1 .. N) + sum(ln((1 - d[i])^(s2 - 1)), i = 1 .. N)
ε1 := sqrt(2/(N - 1))*Dx*t1
ε1 = 0.0115885
Dxl := Dx - ε1
Dxr := Dx + ε1
Dxl = 0.0703538
Dxr = 0.0935308
t1 := □  # error: This placeholder is empty.
n*ln(Γ(s1 + s2)/(Γ(s1)*Γ(s2))) + (s1 - 1)*sum(ln(d[i]), i = 1 .. N) + (s2 - 1)*sum(ln(1 - d[i]), i = 1 .. N)
