ORIGIN := 1
μ := 0
σ := 3
x := rnorm(100, μ, σ)
x := sort(x)
f(x) := dnorm(x, μ, σ)
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F(x) := pnorm(x, μ, σ)
i := 0.1, 0.2 .. 0.9
q[i*10] := qnorm(i, μ, σ)
x = [
    -8.1202; -7.79243; -5.80106; -5.3945; -5.15149; -4.89244; -4.68704; -4.60695; -4.38856; -4.11785
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]
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m := mean(x)
m = -0.736418
med := median(x)
med = -0.913571
D := var(x)
D = 7.82839
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σ := stdev(x)
σ = 2.79793
xmin := min(x)
xmin = -8.1202
xmax := max(x)
xmax = 7.18812
R := xmax - xmin
R = 15.3083
m := 20
L := R/m
i := 1 .. 20
int[i] := xmin + L/2*(2*i - 1)
h := hist(int, x)
i := 1 .. 19
h[i] := h[i]/50
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