ORIGIN := 1
p := 0.05
# Функция распределения и плотность вероятности:
f(x) := dgeom(x, p)
F(x) := pgeom(x, p)
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# Значения процентилей:
i := 0.1, 0.2 .. 0.9
q[i*10] := qgeom(i, p)
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# Выборка и ее числовые характеристики:
x1 := rgeom(70, p)
x1 := sort(x1)
m := mean(x1)
m = 19.4714
med := median(x1)
med = 12
D := var(x1)
D = 515.735
sigma := stdev(x1)
sigma = 22.7098
x1 = [
    0; 0; 0; 0; 1; 2; 2; 3; 3; 3
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]
xmin := min(x1)
xmin = 0
xmax := max(x1)
xmax = 130
# Гистограмма выборки:
R := xmax - xmin
R = 130
m := 20
L := R/m
i := 1 .. 20
int[i] := xmin + L/2*(2*i - 1)
h := hist(int, x1)
i := 1 .. 19
h[i] := h[i]/50
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