ORIGIN := 1
mx1 := 9
σx1 := sqrt(18)
Dx1 := 18
mx2 := 10.5
σx2 := sqrt(20)
Dx2 := 20
a := 0
b := 0.5
n := 50
n1 := 100
NORM := rnorm(n, mx1, σx1)
NORM1 := rnorm(n1, mx2, σx2)
UNIF := runif(n, a, b)
i := 1 .. 50
NORM[i] := NORM[i] + UNIF[i]
NORM = [
    11.8606; 8.42828; 2.73638; 9.22476; 11.0378; 12.3375; 15.9608; 6.83483; 10.0274; 4.23225
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]
NORM1 = [
    7.89365; 9.22431; 13.3738; 13.4815; 6.87388; 5.08098; 7.72442; 5.61703; 13.6498; 10.85
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]
UNIF = [
    0.138528; 0.307764; 0.419289; 0.322549; 0.479528; 0.025599; 0.102612; 0.422672; 0.440407; 0.281506
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]
# Проверки гипотезы о матожидании при известной дисперсии:
α := 0.05
xmean := mean(NORM)
xmean = 8.5034
xright := qnorm(1 - α/2, 0, 1)
xleft := -xright
zb := (xmean - mx1)/sqrt(Dx1/n)
xleft = -1.95996
xright = 1.95996
zb = -0.82767  # т.к. xleft < zb < xright - гипотеза принимается
# Проверка гипотезы о значении матожидания при неизвестной дисперсии:
Dx := n/(n - 1)*var(NORM)
Dx = 18.291
xright := qt(1 - α, n - 1)
xright = 1.67655
zb := (xmean - mx1)/sqrt(Dx/n)
zb = -0.821059
# т.к. zb < xright - гипотеза принимается
# Гипотеза о числовом значении дисперсии:
xleft := qchisq(α, n - 1)
xleft = 33.9303
zb := (n - 1)*Dx/Dx1
zb = 49.7923
# т.к. xleft < zb - гипотеза принимается
# Гипотеза о равентсве матожиданий нормальных выборок с известными дисперсиями:
xleft := qnorm(α, 0, 1)
xleft = -1.64485
ymean := mean(NORM1)
ymean = 10.0018
zb := (xmean - ymean)/sqrt(Dx1/n + Dx2/n1)
zb = -2.00233
# т.к. zb < xleft - гипотеза отвергается
# Гипотеза о равенстве матожиданий выборок с неизвестными равными дисперсиями
Dy := n1/(n1 - 1)*var(NORM1)
Dy = 22.7334
xright := qt(1 - α, n + n1 - 2)
xright = 1.65521
zb := (xmean - ymean)/sqrt((1/n + 1/n1)*((n - 1)*Dx + (n1 - 1)*Dy)/(n + n1 - 2))
zb = -1.87612
# тк zb < xright - гипотеза принимается
# Гипотеза о равенстве дисперсий двух нормальных выборок:
xleft := qF(α/2, n - 1, n1 - 1)
xleft = 0.601032
xright := qF(1 - α/2, n - 1, n1 - 1)
xright = 1.59739
zb := Dx/Dy
zb = 0.804588
# тк xleft < zb < xright - гипотеза принимается
