ORIGIN := 1
A := [0, 1; -4, -5]
B := [1; 1]
C := [1, 0]
I := identity(2)
I = [1, 0; 0, 1]
r := eigenvals(A)
r = [-1; -4]
M(p) := p*I - A
M(p) → [p, -1; 4, p + 5]
N(p) := M(p)^-1
N(p) → [(p + 5)/(p^2 + 5*p + 4), 1/(p^2 + 5*p + 4); -1/(p^2/4 + 5*p/4 + 1), p/(p^2 + 5*p + 4)]
W(p) := C*N(p)*B
W(p) → 1/(p^2 + 5*p + 4) + (p + 5)/(p^2 + 5*p + 4)
W(p) simplify; expand, p + 3 → (p + 6)/(p^2 + 5*p + 4)
i := sqrt(-1)
W(p) substitute, p == i*ω → -(ω^2 - 24 + 26*ω*1i + ω^3*1i)/(ω^4 + 17*ω^2 + 16)
W(i*ω) simplify → -(-5/3 + 5/3*ω*1i)/(ω^2 + 1) + (-8/3 + 2/3*ω*1i)/(ω^2 + 16)
W(p) substitute, p == -i*ω → (24 - ω^2 + 26*ω*1i + ω^3*1i)/(ω^4 + 17*ω^2 + 16)
W(-i*ω) simplify → (5/3 + 5/3*ω*1i)/(ω^2 + 1) - (8/3 + 2/3*ω*1i)/(ω^2 + 16)
V(ω) := -(-5/3 + 5/3*ω*1i)/(ω^2 + 1) + (-8/3 + 2/3*ω*1i)/(ω^2 + 16)
V1(ω) := (5/3 + 5/3*ω*1i)/(ω^2 + 1) - (8/3 + 2/3*ω*1i)/(ω^2 + 16)
Su := 1
Sy(ω) := V(ω)*Su*V1(ω)
Sy(ω) collect → (ω^2 + 36)/(ω^4 + 17*ω^2 + 16)
f1(ω) := ω^2 + 36
f2(ω) := ω^4 + 17*ω^2 + 16
f(ω) := f1(ω)/f2(ω) expand; collect → (ω^2 + 36)/(ω^4 + 17*ω^2 + 16)
integral(f(ω), ω) → 7*atan(ω)/3 - atan(ω/4)/3
limit(2*atan(ω) - atan(ω/5)/5, ω → ∞) → 9*π/10
limit(2*atan(ω) - atan(ω/5)/5, ω → -∞) → -9*π/10 = -2.82743
integral(Sy(ω), ω = -∞ .. ∞) = 6.28319
