ORIGIN := 1
N := 10
n := 21
β := 0.5
m := N + n + 1
D := 7
α := 0.1
dt := 0.275
i := 1 .. n
t[i] := i*dt - 3.025
i := 1 .. n
xx[:, i] := rnorm(m, 0, 1)
Kksi[i] := D*e^(-α*|t[i]|)*(cos(β*t[i]) - α/β*sin(β*|t[i]|))
m = 32
t = [-2.75; -2.475; -2.2; -1.925; -1.65; -1.375; -1.1; -0.825; -0.55; -0.275; 0; 0.275; 0.55; 0.825; 1.1; 1.375; 1.65; 1.925; 2.2; 2.475; 2.75]
Kksi = [-0.00867152; 0.755111; 1.54684; 2.35212; 3.15546; 3.94055; 4.69051; 5.38821; 6.01663; 6.55916; 7; 6.55916; 6.01663; 5.38821; 4.69051; 3.94055; 3.15546; 2.35212; 1.54684; 0.755111; -0.00867152]
xx[:, 1] = [
    -0.438971; -0.679406; -0.473286; -0.951466; -1.68568; 0.0435303; -0.120635; 0.556426; 2.19179; 0.808735
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]
xx[:, 21] = [
    -0.130818; -0.223303; 0.153119; 1.39628; -0.237685; 1.72244; 0.772392; -1.65316; 1.81572; -0.094811
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]
c[i] := 0.5
f(t) := Kksi
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i := 1 .. N
Given
c = [0.5; 0.5; 0.5; 0.5; 0.5; 0.5; 0.5; 0.5; 0.5; 0.5; 0.5; 0.5; 0.5; 0.5; 0.5; 0.5; 0.5; 0.5; 0.5; 0.5; 0.5]
c[1]^2 + c[2]^2 + c[3]^2 + c[4]^2 + c[5]^2 + c[6]^2 + c[7]^2 + c[8]^2 + c[9]^2 + c[10]^2 == Kksi[1]
c[1]*c[2] + c[2]*c[3] + c[3]*c[4] + c[4]*c[5] + c[5]*c[6] + c[6]*c[7] + c[7]*c[8] + c[8]*c[9] + c[9]*c[10] == Kksi[3]
c[1]*c[3] + c[2]*c[4] + c[3]*c[5] + c[4]*c[6] + c[5]*c[7] + c[6]*c[8] + c[7]*c[9] + c[8]*c[10] == Kksi[5]
c[1]*c[4] + c[2]*c[5] + c[3]*c[6] + c[4]*c[7] + c[5]*c[8] + c[6]*c[9] + c[7]*c[10] == Kksi[7]
c[1]*c[5] + c[2]*c[6] + c[3]*c[7] + c[4]*c[8] + c[5]*c[9] + c[6]*c[10] == Kksi[9]
c[1]*c[6] + c[2]*c[7] + c[3]*c[8] + c[4]*c[9] + c[5]*c[10] == Kksi[11]
c[1]*c[7] + c[2]*c[8] + c[3]*c[9] + c[4]*c[10] == Kksi[13]
c[1]*c[8] + c[2]*c[9] + c[3]*c[10] == Kksi[15]
c[1]*c[9] + c[2]*c[10] == Kksi[17]
c[1]*c[10] == Kksi[19]
Minerr(c) = [0.936646; 0.706154; 0.638576; 0.632272; 0.651222; 0.651223; 0.632272; 0.638576; 0.706154; 0.936646; 0.5; 0.5; 0.5; 0.5; 0.5; 0.5; 0.5; 0.5; 0.5; 0.5; 0.5]
c[1] := 0.45
c[2] := 0.341
c[3] := 0.312
c[4] := 0.307
c[5] := 0.309
c[6] := 0.309
c[7] := 0.307
c[8] := 0.312
c[9] := 0.341
c[10] := 0.45
x1 := xx[:, 1]
x2 := xx[:, 2]
x3 := xx[:, 3]
x4 := xx[:, 4]
x5 := xx[:, 5]
x6 := xx[:, 6]
x7 := xx[:, 7]
x8 := xx[:, 8]
x9 := xx[:, 9]
x10 := xx[:, 10]
i := 1 .. n
ksi[i, 1] := sum(c[k]*x1[N + i - k], k = 1 .. N)
ksi[i, 2] := sum(c[k]*x2[N + i - k], k = 1 .. N)
ksi[i, 3] := sum(c[k]*x3[N + i - k], k = 1 .. N)
ksi[i, 4] := sum(c[k]*x4[N + i - k], k = 1 .. N)
ksi[i, 5] := sum(c[k]*x5[N + i - k], k = 1 .. N)
ksi[i, 6] := sum(c[k]*x6[N + i - k], k = 1 .. N)
ksi[i, 7] := sum(c[k]*x7[N + i - k], k = 1 .. N)
ksi[i, 8] := sum(c[k]*x8[N + i - k], k = 1 .. N)
ksi[i, 9] := sum(c[k]*x9[N + i - k], k = 1 .. N)
ksi[i, 10] := sum(c[k]*x10[N + i - k], k = 1 .. N)
ksi = [
    -0.128506, -0.805662, -0.703303, 0.30983, -1.01067, 0.98067, -0.372502, 1.03132, -1.62855, -0.256983;
    0.26844, -0.971604, -1.33942, 1.33203, -1.35191, 1.05428, 0.365126, 0.844688, -2.0011, -1.22241;
    0.733801, -0.326297, -1.538, 0.0372131, -1.0581, 1.53279, 0.192277, 0.366484, -2.2491, -1.03503;
    1.08444, 0.223975, -0.673159, 1.01681, -1.56939, 1.44831, -0.189673, -0.0663913, -1.80574, -0.804407;
    1.50314, 0.454977, -1.11283, 0.436788, -1.74424, 1.77242, -0.959744, 0.59526, -1.40682, -0.940851;
    1.68916, 0.405158, -1.91879, -0.037153, -1.46615, 1.73925, -0.636892, 0.561856, -2.26192, -0.958957;
    1.80444, 0.14415, -1.41698, -0.520158, -1.36224, 2.19251, -0.218657, -0.160527, -1.52397, -1.37119;
    1.66622, 0.144335, -1.0187, -1.00219, -1.09618, 2.44339, -0.592513, -0.842741, -1.68371, -1.13961;
    2.08182, 0.461895, -1.82836, -0.980838, -0.525399, 1.27586, 0.564292, -0.4703, -1.22389, -1.20125;
    1.07641, 0.742066, -1.80889, -1.59311, -0.758039, 1.89223, -0.169798, 0.568026, -0.952829, -0.768467;
    0.56165, 0.793613, -1.66383, -0.0283083, -0.468135, 1.77364, 0.176983, -0.149649, -1.10345, -0.204934;
    -0.0105411, 0.696513, -1.56981, -1.44863, -0.138568, 1.4321, 0.503885, 0.0247176, -0.943332, -0.105413;
    -0.417233, 1.7361, -1.37442, -1.04808, 0.278056, 0.67025, 1.42168, -0.0459465, -1.08741, -0.142231;
    -0.453079, 1.29387, -1.17936, -1.11404, -0.216552, 0.416603, 1.35201, -0.561592, -2.14927, 0.284659;
    -1.02662, 0.513509, -1.79094, -0.720878, 0.200001, 0.521423, 0.635021, -0.401992, -1.8844, 1.02216;
    -0.515287, 0.659806, -2.66288, -0.119152, 0.698794, 0.0942038, 0.461904, -0.0272733, -1.81966, 0.0652591;
    -0.0468107, 0.49047, -1.52285, -0.318986, 0.161303, 0.286071, 1.23309, -0.55435, -2.04826, 1.11127;
    -0.0931897, -0.120865, -1.42842, 0.859642, 0.759635, -2.023, 1.44583, -0.619783, -1.55821, 0.487405;
    -0.407575, -0.500861, -1.56684, 1.3113, 0.65481, -0.295102, 0.190646, -0.74492, -1.26275, 0.124933;
    0.0919045, -0.607113, -2.41528, 1.52272, -0.0274542, 0.30047, 0.505004, -2.00727, -2.52511, 0.249423;
    0.578293, -0.327764, -2.35997, 0.709265, 0.205943, 0.688412, 0.204592, -1.52057, -2.40434, -0.548363
]
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