ORIGIN := 1
n := 10
k := 21
Ksi[1] := -6.18
Ksi[2] := -9.37
Ksi[3] := 0.15
Ksi[4] := 2.97
Ksi[5] := 4.02
Ksi[6] := -0.06
Ksi[7] := 8.50
Ksi[8] := -2.5
Ksi[9] := -3.87
Ksi[10] := 9.95
Ksi = [-6.18; -9.37; 0.15; 2.97; 4.02; -0.06; 8.5; -2.5; -3.87; 9.95]
P := [
    0.06, 0.09, 0.13, 0.13, 0.12, 0.12, 0.10, 0.10, 0.08, 0.07;
    0, 0.08, 0.12, 0.16, 0.15, 0.13, 0.08, 0.08, 0.10, 0.10;
    0, 0, 0.10, 0.08, 0.14, 0.16, 0.14, 0.14, 0.12, 0.12;
    0, 0, 0, 0.12, 0.18, 0.18, 0.16, 0.14, 0.12, 0.10;
    0, 0, 0, 0, 0.14, 0.19, 0.20, 0.17, 0.15, 0.15;
    0, 0, 0, 0, 0, 0.16, 0.24, 0.25, 0.20, 0.15;
    0, 0, 0, 0, 0, 0, 0.18, 0.32, 0.30, 0.20;
    0, 0, 0, 0, 0, 0, 0, 0.20, 0.30, 0.50;
    0, 0, 0, 0, 0, 0, 0, 0, 0.22, 0.78;
    0, 0, 0, 0, 0, 0, 0, 0, 0, 1.00
]
pp[1, 1] := 0.3
pp[2, 1] := 0.21
pp[3, 1] := 0.15
pp[4, 1] := 0.10
pp[5, 1] := 0.07
pp[6, 1] := 0.05
pp[7, 1] := 0.04
pp[8, 1] := 0.02
pp[9, 1] := 0.02
pp[10, 1] := 0.04
i := 1 .. n
j := 2 .. k + 1
pp[i, j] := sum(pp[m, j - 1]*P[m, i], m = 1 .. n)
pp = [
    0.3, 0.018, 0.00108, 6.48e-5, 3.888e-6, 2.3328e-7, 1.39968e-8, 8.39808e-10, 5.03885e-11, 3.02331e-12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;
    0.21, 0.0438, 0.005124, 0.00050712, 4.64016e-5, 4.06205e-6, 3.45959e-7, 2.89364e-8, 2.3905e-9, 1.95775e-10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;
    0.15, 0.0792, 0.015516, 0.00230688, 0.000299966, 3.60703e-5, 4.1248e-6, 4.55815e-7, 4.9163e-8, 5.20971e-9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;
    0.1, 0.0966, 0.027276, 0.00547464, 0.00093107, 0.000143655, 2.08045e-5, 2.8837e-6, 3.87248e-7, 5.07919e-8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;
    0.07, 0.1163, 0.053488, 0.0154684, 0.00355782, 0.00071511, 0.000131661, 2.28083e-5, 3.78049e-6, 6.06221e-7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;
    0.05, 0.1266, 0.080267, 0.0311934, 0.00935819, 0.00239538, 0.000551317, 0.000117678, 2.37579e-5, 4.59744e-6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;
    0.04, 0.117, 0.106552, 0.0561954, 0.0219412, 0.00710202, 0.00202466, 0.000527022, 0.000128196, 2.96023e-5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;
    0.02, 0.123, 0.143377, 0.0984406, 0.0492351, 0.019989, 0.00701638, 0.0022149, 0.000645393, 0.000176745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;
    0.02, 0.1179, 0.167619, 0.141665, 0.0871058, 0.0430741, 0.018212, 0.00685198, 0.00235737, 0.00075607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;
    0.04, 0.1616, 0.399701, 0.648683, 0.827521, 0.92654, 0.972039, 0.990262, 0.996841, 0.999032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]
uporjad(x) :=
    n ← rows(x)
    for i ∈ 1 .. n - 1
        for j ∈ i + 1 .. n
            a ← x[i]
            if x[j] < x[i]
                x[i] ← x[j]
                x[j] ← a
    x
x := uporjad(pp[:, 2])
rjadraspred(p, x) :=
    n ← rows(p)
    for i ∈ 1 .. n
        γ ← rnd(1)
        a ← 0
        for j ∈ 1 .. n
            a ← a + p[j]
            if γ < a
                y[i] ← x[j]
                break
    y
y := rjadraspred(x, Ksi)
x = [0.018; 0.0438; 0.0792; 0.0966; 0.1163; 0.117; 0.1179; 0.123; 0.1266; 0.1616]
y = [-0.06; -0.06; -0.06; -6.18; -3.87; 0.15; -2.5; 2.97; -9.37; -9.37]
tcschepmarkova(k, pp, Ksi) :=
    for i ∈ 1 .. k
        x ← pp[:, i + 1]
        y ← uporjad(x)
        z ← rjadraspred(y, Ksi)
        xx[:, i] ← z
    xx
zz := tcschepmarkova(k, pp, Ksi)
zz = [
    -2.5, -2.5, -3.87, 9.95, 9.95, 9.95, 9.95, 9.95, 9.95, 9.95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;
    9.95, 9.95, 9.95, 9.95, 9.95, 9.95, 9.95, 9.95, 9.95, 9.95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;
    -0.06, 9.95, 9.95, 9.95, 9.95, 9.95, 9.95, 9.95, 9.95, 9.95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;
    4.02, -0.06, 9.95, 9.95, 9.95, 9.95, 9.95, 9.95, 9.95, 9.95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;
    -2.5, 9.95, 9.95, 9.95, 9.95, 9.95, 9.95, 9.95, 9.95, 9.95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;
    -9.37, 9.95, 9.95, 9.95, 9.95, 9.95, 9.95, -3.87, 9.95, 9.95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;
    0.15, 9.95, 9.95, 9.95, 8.5, 9.95, 9.95, 9.95, 9.95, 9.95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;
    8.5, 9.95, 9.95, 9.95, 9.95, 9.95, 9.95, 9.95, 9.95, 9.95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;
    -0.06, -3.87, 9.95, 9.95, 9.95, 9.95, 9.95, 9.95, 9.95, 9.95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;
    4.02, -3.87, 9.95, 9.95, 9.95, 9.95, 9.95, 9.95, 9.95, 9.95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]
i := 1 .. k
t[i] := i
z := transpose(zz)
z = [
    -2.5, 9.95, -0.06, 4.02, -2.5, -9.37, 0.15, 8.5, -0.06, 4.02;
    -2.5, 9.95, 9.95, -0.06, 9.95, 9.95, 9.95, 9.95, -3.87, -3.87;
    -3.87, 9.95, 9.95, 9.95, 9.95, 9.95, 9.95, 9.95, 9.95, 9.95;
    9.95, 9.95, 9.95, 9.95, 9.95, 9.95, 9.95, 9.95, 9.95, 9.95;
    9.95, 9.95, 9.95, 9.95, 9.95, 9.95, 8.5, 9.95, 9.95, 9.95;
    9.95, 9.95, 9.95, 9.95, 9.95, 9.95, 9.95, 9.95, 9.95, 9.95;
    9.95, 9.95, 9.95, 9.95, 9.95, 9.95, 9.95, 9.95, 9.95, 9.95;
    9.95, 9.95, 9.95, 9.95, 9.95, -3.87, 9.95, 9.95, 9.95, 9.95;
    9.95, 9.95, 9.95, 9.95, 9.95, 9.95, 9.95, 9.95, 9.95, 9.95;
    9.95, 9.95, 9.95, 9.95, 9.95, 9.95, 9.95, 9.95, 9.95, 9.95;
    9.95, 9.95, 9.95, 9.95, 9.95, 9.95, 9.95, 9.95, 9.95, 9.95;
    9.95, 9.95, 9.95, 9.95, 9.95, 9.95, 9.95, 9.95, 9.95, 9.95;
    9.95, 9.95, 9.95, 9.95, 9.95, 9.95, 9.95, 9.95, 9.95, 9.95;
    9.95, 9.95, 9.95, 9.95, 9.95, 9.95, 9.95, 9.95, 9.95, 9.95;
    9.95, 9.95, 9.95, 9.95, 9.95, 9.95, 9.95, 9.95, 9.95, 9.95;
    9.95, 9.95, 9.95, 9.95, 9.95, 9.95, 9.95, 9.95, 9.95, 9.95;
    9.95, 9.95, 9.95, 9.95, 9.95, 9.95, 9.95, 9.95, 9.95, 9.95;
    9.95, 9.95, 9.95, 9.95, 9.95, 9.95, 9.95, 9.95, 9.95, 9.95;
    9.95, 9.95, 9.95, 9.95, 9.95, 9.95, 9.95, 9.95, 9.95, 9.95;
    9.95, 9.95, 9.95, 9.95, 9.95, 9.95, 9.95, 9.95, 9.95, 9.95;
    9.95, 9.95, 9.95, 9.95, 9.95, 9.95, 9.95, 9.95, 9.95, 9.95
]
table(z, eps) :=
    k ← rows(z)
    n ← cols(z)
    for i ∈ 1 .. k
        m ← 0
        for j ∈ 2 .. n
            m ← m + 1
            a ← z[i, j - 1]
            if |a - z[i, j]| < 10^-3
                (γ ← rnd(1))
                a ← -a if γ < 0.5
                z[i, j - 1] ← z[i, j - 1] + a*m*eps
            if j == n
                m ← m + 1
                z[i, j] ← z[i, j] - a*m*eps
    z
z := table(z, 0.01)
z = [
    -2.5, 9.95, -0.06, 4.02, -2.5, -9.37, 0.15, 8.5, -0.06, 4.026;
    -2.5, 10.149, 9.95, -0.06, 10.4475, 10.547, 10.6465, 9.95, -4.2183, -3.483;
    -3.87, 9.751, 9.6515, 9.552, 9.4525, 9.353, 9.2535, 10.746, 10.8455, 8.955;
    10.0495, 10.149, 9.6515, 9.552, 9.4525, 9.353, 9.2535, 10.746, 9.0545, 10.945;
    9.8505, 9.751, 9.6515, 9.552, 9.4525, 9.95, 8.5, 9.154, 10.8455, 8.955;
    10.0495, 9.751, 10.2485, 10.348, 10.4475, 9.353, 10.6465, 9.154, 10.8455, 8.955;
    10.0495, 9.751, 10.2485, 9.552, 9.4525, 10.547, 10.6465, 10.746, 10.8455, 8.955;
    9.8505, 10.149, 9.6515, 9.552, 9.95, -3.87, 10.6465, 10.746, 10.8455, 8.955;
    10.0495, 10.149, 9.6515, 9.552, 10.4475, 10.547, 10.6465, 10.746, 10.8455, 8.955;
    9.8505, 10.149, 9.6515, 10.348, 9.4525, 10.547, 10.6465, 9.154, 10.8455, 8.955;
    9.8505, 9.751, 9.6515, 9.552, 10.4475, 9.353, 9.2535, 10.746, 10.8455, 8.955;
    9.8505, 9.751, 9.6515, 10.348, 10.4475, 10.547, 10.6465, 10.746, 9.0545, 10.945;
    9.8505, 9.751, 9.6515, 9.552, 9.4525, 9.353, 10.6465, 9.154, 10.8455, 8.955;
    10.0495, 10.149, 9.6515, 9.552, 9.4525, 9.353, 10.6465, 10.746, 9.0545, 10.945;
    10.0495, 9.751, 10.2485, 10.348, 10.4475, 10.547, 10.6465, 9.154, 9.0545, 10.945;
    9.8505, 9.751, 9.6515, 10.348, 9.4525, 9.353, 9.2535, 10.746, 10.8455, 8.955;
    9.8505, 10.149, 10.2485, 9.552, 9.4525, 9.353, 10.6465, 9.154, 10.8455, 8.955;
    9.8505, 9.751, 9.6515, 10.348, 9.4525, 9.353, 9.2535, 9.154, 10.8455, 8.955;
    9.8505, 10.149, 9.6515, 10.348, 9.4525, 9.353, 9.2535, 9.154, 10.8455, 8.955;
    9.8505, 9.751, 9.6515, 10.348, 9.4525, 10.547, 10.6465, 10.746, 9.0545, 10.945;
    9.8505, 9.751, 10.2485, 9.552, 10.4475, 9.353, 10.6465, 9.154, 9.0545, 10.945
]
Ksi1 := z[:, 1]
Ksi2 := z[:, 2]
Ksi3 := z[:, 3]
Ksi4 := z[:, 4]
Ksi5 := z[:, 5]
Ksi6 := z[:, 6]
Ksi7 := z[:, 7]
Ksi8 := z[:, 8]
Ksi9 := z[:, 9]
Ksi10 := z[:, 10]
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