ORIGIN := 1
μ := 2.5
λ := 0.8
x1 := rcauchy(50, μ, λ)
x1 := sort(x1)
f(x) := dcauchy(x, μ, λ)
F(x) := pcauchy(x, μ, λ)
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x1 = [
    -198.259; -26.3738; -26.032; -1.91523; -0.208734; 0.462238; 0.896599; 0.948719; 1.11016; 1.13748
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]
m := mean(x1)
m = -0.606494
med := median(x1)
med = 2.56493
D := var(x1)
D = 967.412
σ := stdev(x1)
σ = 31.1032
xmin := min(x1)
xmax := max(x1)
xmin = -198.259
xmax = 81.9666
E := 0.477*sqrt(2)*σ
E = 20.9816
R := xmax - xmin
R = 280.226
m := 20
L := R/m
i := 1 .. 20
int[i] := xmin + L*(2*i - 1)/2
h := hist(int, x1)
i := 1 .. 20
h[i] := h[i]/50  # error: index out of bounds
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