ORIGIN := 1
Randu(ix, k) :=
    for i ∈ 1 .. k
        iy ← ix*65539
        iy*(iy ← iy + 2147483647 + 1) if iy < 0
        while iy > 2147483648
            iy ← iy - 2147483648
        rand[i] ← iy/2147483648
        ix ← iy
    rand
ix := 19510
u := Randu(ix, 1)
u = [0.595425]
u1 := Randu(ix, 100)
u1 = [
    0.595425; 0.572469; 0.0759899; 0.303714; 0.138377; 0.096833; 0.335604; 0.142127; 0.832324; 0.714808
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]
