ORIGIN := 1
n := 100
μ := 0
σ := 3
x := rnorm(n, μ, σ)
x := sort(x)
# Точечные оценки матожидания и дисперсии:
Mx := mean(x)
Mx = -0.142599
Dx := var(x)
Dx = 8.54967
σx := sqrt(Dx)
σx = 2.92398
# логарифмическая ф-я правдоподобия:
x = [
    -9.03527; -6.79408; -6.50995; -5.25205; -4.44081; -3.92098; -3.64896; -3.45206; -3.43097; -3.34667
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]
L(x) := -n/2*ln(2*π*σ^2) - 1/(2*σ^2)*sum((x[i] - μ)^2, i = 1 .. n)
Mx := 1/n*sum(x[i], i = 1 .. n) = -0.142599
Dx := 1/n*sum((x[i] - Mx)^2, i = 1 .. n) = 8.54967
# 95%-ные доверительные интервалы:
β := 0.95
n1 := qnorm((1 + β)/2, μ, σ)
n1 = 5.87989
ε := sqrt(Dx/n)*n1 = 1.71927
Mxl := Mx - ε = -1.86187
Mxr := Mx + ε = 1.57667
ε1 := sqrt(2/(n - 1))*Dx*n1 = 7.14522
Dxl := Dx - ε1 = 1.40444
Dxr := Dx + ε1 = 15.6949
# Изменение длины точного доверительного интервала для дисперсии в зависимости от объема выборки:
β1 := (1 - β)/2
β2 := (1 + β)/2
k := 5 .. 100
nright(k) := Dx*(k - 1)/qnorm(β2, μ, σ)
nleft(k) := Dx*(k - 1)/qnorm(β1, μ, σ)
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