ORIGIN := 1
A := [0, 1; -5, -6]
B := [1; 1]
C := [1, 0]
I := identity(2)
I = [1, 0; 0, 1]
r := eigenvals(A)
r = [-1; -5]
M(p) := p*I - A
M(p) → [p, -1; 5, p + 6]
N(p) := M(p)^-1
N(p) → [(p + 6)/(p^2 + 6*p + 5), 1/(p^2 + 6*p + 5); -1/(p^2/5 + 6*p/5 + 1), p/(p^2 + 6*p + 5)]
W(p) := C*N(p)*B
W(p) → 1/(p^2 + 6*p + 5) + (p + 6)/(p^2 + 6*p + 5)
W(p) simplify; expand, p + 3 → 3/(2*(p + 1)) - 1/(2*p + 10)
i := sqrt(-1)
W(p) substitute, p == i*ω → -(ω^2 - 35 + 37*ω*1i + ω^3*1i)/(ω^4 + 26*ω^2 + 25)
W(i*ω) simplify → -(-3/2 + 3/2*ω*1i)/(ω^2 + 1) + (-5/2 + 1/2*ω*1i)/(ω^2 + 25)
W(p) substitute, p == -i*ω → (35 - ω^2 + 37*ω*1i + ω^3*1i)/(ω^4 + 26*ω^2 + 25)
W(-i*ω) simplify → (3/2 + 3/2*ω*1i)/(ω^2 + 1) - (5/2 + 1/2*ω*1i)/(ω^2 + 25)
V(ω) := -(-3/2 + 3/2*ω*1i)/(ω^2 + 1) + (-5/2 + 1/2*ω*1i)/(ω^2 + 25)
V1(ω) := (3/2 + 3/2*ω*1i)/(ω^2 + 1) - (5/2 + 1/2*ω*1i)/(ω^2 + 25)
Su := 1
Sy(ω) := V(ω)*Su*V1(ω)
Sy(ω) collect → (ω^2 + 49)/(ω^4 + 26*ω^2 + 25)
f1(ω) := ω^2 + 49
f2(ω) := ω^4 + 26*ω^2 + 25
f(ω) := f1(ω)/f2(ω) expand; collect → (ω^2 + 49)/(ω^4 + 26*ω^2 + 25)
integral(f(ω), ω) → 2*atan(ω) - atan(ω/5)/5
limit(2*atan(ω) - atan(ω/5)/5, ω → ∞) → 9*π/10
limit(2*atan(ω) - atan(ω/5)/5, ω → -∞) → -9*π/10 = -2.82743
integral(Sy(ω), ω = -∞ .. ∞) = 5.65487
