ORIGIN := 1
mx1 := 8
σx1 := 4.36
Dx1 := 19
mx2 := 9.5
σx2 := 4.69
Dx2 := 22
a := 0
b := 0.5
n := 50
n1 := 100
NORM1 := rnorm(n, mx1, σx1)
NORM2 := rnorm(n1, mx2, σx2)
UNIF := runif(n, a, b)
i := 1 .. 50
NORM1U[i] := NORM1[i] + UNIF[i]
# Проверим H0: M(NORM1) = 8 при известном значении дисперсии, используя двусторонний критерий.
α := 0.05
xmean := mean(NORM1U)
xmean = 8.11587
xright := qnorm(1 - α/2, 0, 1)
xright = 1.95996
xleft := -xright
xleft = -1.95996
zb := (xmean - mx1)/sqrt(Dx1/n)
zb = 0.187973
# Гипотеза H0 принимается, т.к xleft < zb < xright, т.е. выборочная статистика критерия находится в области принятия решения.
# Проверим H0: M(NORM1) = 8 при неизвестном значении дисперсии, используя правосторонний критерий.
Dx := n/(n - 1)*var(NORM1U)
Dx = 15.4787
xright := qt(1 - α, n - 1)
xright = 1.67655
zb := (xmean - mx1)/sqrt(Dx/n)
zb = 0.208259
# Гипотеза H0 принимается, т.к zb < xright.
# Проверим гипотезу о числовом значении дисперсии, используя левосторонний критерий.
xleft := qchisq(α, n - 1)
xleft = 33.9303
zb := (n - 1)*Dx/Dx1
zb = 39.9187
# Гипотеза H0: Dx = 19 при левостороннем критерии принимается против альтернативы
# H1: Dx < 10, т.к. zb > xleft.
# Проверим H0: mx1 = mx2 при известных дисперсиях выборок с помощью левостороннего критерия.
xleft := qnorm(α, 0, 1)
xleft = -1.64485
xmean := mean(NORM1)
xmean = 7.82265
ymean := mean(NORM2)
ymean = 8.8305
zb := (xmean - ymean)/sqrt(Dx1/n + Dx2/n1)
zb = -1.30112
# Гипотеза принимается, т.к. zb > xleft.
# Проверим H0: mx1 = mx2 при неизвестных, но равных дисперсиях.
# Вычислим несмещенную оценку дисперсии второй нормальной выборки.
# Примем H1: mx > my - правосторонний критерий:
Dx := n/(n - 1)*var(NORM1)
Dx = 15.5349
Dy := n1/(n1 - 1)*var(NORM2)
Dy = 22.8741
xright := qt(1 - α, n + n1 - 2)
xright = 1.65521
zb := (xmean - ymean)/sqrt((1/n + 1/n1)*((n - 1)*Dx + (n1 - 1)*Dy)/(n + n1 - 2))
zb = -1.28691
# Получили zb < xright, т.о. основная гипотеза должна быть принята.
# Наконец H0: Dx = Dy. Используем двусторонний критерий: H1: Dx ≠ Dy:
xleft := qF(α/2, n - 1, n1 - 1)
xleft = 0.601032
xright := qF(1 - α/2, n - 1, n1 - 1)
xright = 1.59739
zb := Dx/Dy
zb = 0.679147
# Т.к. xleft < zb < xright, гипотеза H0 принимается.
