ORIGIN := 1
μ := 2.5
σ := 1
n := 100
x := rnorm(n, μ, σ)
f(z) := dnorm(z, μ, σ)
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F(z) := pnorm(z, μ, σ)
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i := 0.1, 0.2 .. 0.9
q[i*10] := qcauchy(i, μ, σ)
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m := mean(x)
m = 2.34955  # матожидание
med := median(x)
med = 2.43002
D := var(x)
D = 0.954842  # дисперсия
σ1 := stdev(x)
σ1 = 0.97716
xmin := min(x)
xmin = -0.400872
xmax := max(x)
xmax = 5.54815
E := 0.477*sqrt(2)*σ
E = 0.67458
R := xmax - xmin
R = 5.94902
mteor := μ
mteor = 2.5
Dteor := σ^2
Dteor = 1
N := 1 + 3.322*log(n)
N = 7.644
nn := 7
hh := histogram(nn, x)
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