ORIGIN := 1
l := 2.5
n := 1
m := 100
x := rlogis(m, l, n)
f(z) := dlogis(z, l, n)
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F(z) := plogis(z, l, n)
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i := 0.1, 0.2 .. 0.9
q[i*10] := qcauchy(i, l, n)
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m1 := mean(x)
m1 = 2.4567
med := median(x)
med = 2.62613
D := var(x)
D = 3.70979
σ := stdev(x)
σ = 1.92608
xmin := min(x)
xmin = -4.16871
xmax := max(x)
xmax = 8.24003
E := 0.477*sqrt(2)*σ
E = 1.2993
R := xmax - xmin
R = 12.4087
mteor := l
mteor = 2.5
Dteor := n^2
Dteor = 1
N := 1 + 3.322*log(m)
N = 7.644
nn := 7
hh := histogram(nn, x)
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