ORIGIN := 1
n := 100
a := 2
σ1 := 1.5
normal(a, σ1, s) :=
    for i ∈ 1 .. s
        r ← runif(12, 0, 1)
        x[i] ← a + σ1*(sum(r[j], j = 1 .. 12) + (-6))
    x
z := normal(a, σ1, n)
z = [
    -0.2685; 1.92938; 3.67965; 2.52781; 1.55872; 3.70134; 3.7831; -0.664924; 2.14623; 2.56831
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]
x := rnorm(n, a, σ1)
f(zz) := dnorm(zz, a, σ1)
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# плотность вероятности
F(zz) := pnorm(zz, a, σ1)
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# функция распределения
i := 0.1, 0.2 .. 0.9
q[i*10] := qcauchy(i, σ1, n)
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m := mean(z)
m = 2.03033  # матож
med := median(z)
med = 2.16127
D := var(z)
D = 2.52368  # дисперс
σ := stdev(z)
σ = 1.58861
xmin := min(z)
xmin = -1.70716
xmax := max(z)
xmax = 4.87389
E := 0.477*sqrt(2)*σ
E = 1.07164
R := xmax - xmin
R = 6.58105
N := 1 + 3.322*log(n)
N = 7.644
nn := 7
hh := histogram(nn, z)
mteor := a
mteor = 2
Dteor := σ1^2
Dteor = 2.25  # ПРИМЕРНОЕ
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