ORIGIN := 1
l := 2.5
s := 3
n := 100
x := rlogis(n, l, s)
x = [
    -17.5061; -1.78568; 3.53008; 0.646944; 7.10708; -2.16993; 5.19337; 0.0148364; -4.38957; -2.76749
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]
L(λ1, l) := product(e^(-(x[i] - l)/λ1)/(λ1*(1 + e^(-(x[i] - l)/λ1))^2), i = 1 .. n)
L1(λ1, l) := ln(L(λ1, l))
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L(s, λ2) := product(e^(-(x[i] - λ2)/s)/(s*(1 + e^(-(x[i] - λ2)/s))^2), i = 1 .. n)
L2(s, λ2) := ln(L(s, λ2))
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