ORIGIN := 1
l := 2.5
s := 3
n := 100
x := rlogis(n, l, s)
x = [
    1.7361; 3.44206; 4.07951; 2.54979; 4.98168; -1.85097; -2.08219; 1.98826; -4.17517; -4.28302
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]
L(x, l, s) := product(e^(-(x[i] - l)/s)/(s*(1 + e^(-(x[i] - l)/s))^2), i = 1 .. n)
L1(l, s) := ln(L(x, l, s))
mean(x) = 1.97728
var(x) = 21.6875
