ORIGIN := 1
λ := 1
n := 100
x := rexp(n, λ)
x = [
    6.66998; 1.64339; 0.536133; 1.04894; 0.194996; 1.74796; 0.341793; 1.19077; 2.39239; 1.91519
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]
xx := sort(x)
L1(λ1) := product(λ1*e^(-λ1*x[i]), i = 1 .. n)
L2(λ1) := ln(L1(λ1))
D := var(x)
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D = 1.42945
m := mean(x)
m = 1.03496
med := median(x)
med = 0.63207
Ω := stdev(x)
Ω = 1.19559
xmin := min(x)
xmax := max(x)
xmin = 0.0032095
xmax = 6.66998
E := 0.477*sqrt(2)*Ω
E = 0.806524
R := xmax - xmin
R = 6.66677
β := 0.95
t1 := qnorm((1 + β)/2, 0, 1)
t1 = 1.95996
ε := sqrt(D/n*t1) = 0.167382
Mxl := m - ε = 0.867578
Mxr := m + ε = 1.20234
ε1 := sqrt(2/(n - 1)*D*t1) = 0.237906
Dxl := D - ε1 = 1.19154
Dxr := D + ε1 = 1.66735
t11 := qt((1 + β)/2, n)
t11 = 1.98397
εε := sqrt(D/n*t11) = 0.168404
Mxl1 := m - εε = 0.866556
Mxr1 := m + εε = 1.20336
t11 := qchisq((1 - β)/2, n - 1) = 73.3611
t22 := qchisq((1 + β)/2, n - 1) = 128.422
Dxl1 := D*(n - 1)/t22 = 1.10195
Dxr1 := D*(n - 1)/t11 = 1.92902
β1 := (1 - β)/2
β2 := (1 + β)/2
k := 5 .. 100
tright(k) := D*(k - 1)/qchisq(β2, k - 1)
tleft(k) := D*(k - 1)/qchisq(β1, k - 1)
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