ORIGIN := 1
α := 0.1
n := 50
n1 := 100
mx := 5
my := mx + 1.5 = 6.5
Dx1 := 10
Dy1 := Dx1 + 3 = 13
σ := sqrt(Dx1)
σ1 := sqrt(Dy1)
mx1 := 5
mx2 := 6.5
NORM := rnorm(n, mx1, σ)
NORM1 := rnorm(n1, mx2, σ1)
# 1)Проверки гипотезы о матожидании при известной дисперсии:
xmean := mean(NORM) = 5.46448  # Н0:xmean=6
xright := qnorm(1 - α/2, 0, 1)  # Н1:xmean=5.533<6
xleft := -xright = -1.64485
xright = 1.64485
zb := (xmean - mx)/sqrt(Dx1/n)
zb = 1.0386
# "Мы выдвигаем предположение: если наша статистика критерия попала в интервал значит мы принимаем гипотезу."
# т.к. xleft < zb < xright - гипотеза принимается
# 2)Проверка гипотезы о  числовом значении матожидания при неизвестной дисперсии:
Dx := n/(n - 1)*var(NORM)
Dx = 11.0168  # Н0:xmean=6
xright := qt(1 - α, n - 1)
xright = 1.29907  # Н1:xmean=5.533<6
zb2 := (xmean - 6)/sqrt(Dx/n)
zb2 = -1.14087
zb := (xmean - mx)/sqrt(Dx/n)
zb = 0.989516
# т.к. zb < xright - гипотеза принимается
# 3)Гипотеза о числовом значении дисперсии:
xleft := qchisq(α, n - 1)
xleft = 36.8182  # Н0:Dx=6
zb := (n - 1)*Dx/Dx1
zb = 53.9822  # Н1:Dx<6
# т.к. xleft < zb - гипотеза принимается
# 4)Гипотеза о равентсве матожиданий нормальных выборок с известными равными дисперсиями:
xleft := qnorm(α, 0, 1)
xleft = -1.28155  # Н0:mx1=mx2
ymean := mean(NORM1)
ymean = 7.33686  # Н1:mx1>mx2
zb := (xmean - ymean)/sqrt(Dx1/n + Dy1/n1)
zb = -3.2594
# т.к. zb < xleft - гипотеза отвергается
# 5)Гипотеза о равенстве матожиданий  нормальных выборок с неизвестными равными дисперсиями
Dy := n1/(n1 - 1)*var(NORM1)
Dy = 8.90975  # Н0:mx1=mx2
xright := qt(1 - α, n + n1 - 2)
xright = 1.2873  # Н1:mx1>mx2
zb := (xmean - ymean)/sqrt((1/n + 1/n1)*((n - 1)*Dx + (n1 - 1)*Dy)/(n + n1 - 2))
zb = -3.48764
# тк zb < xright - гипотеза принимается
# 6)Гипотеза о равенстве дисперсий двух нормальных выборок:
xleft := qF(α/2, n - 1, n1 - 1)  # Н0:Dx=Dy
# Н1:Dx не= Dy
xright := qF(1 - α/2, n - 1, n1 - 1)
xright = 1.48167
zb := Dx/Dy
xleft = 0.653168
zb = 1.23649
# тк условие  xleft < zb < xright  выполняется  - гипотеза принимается
