ORIGIN := 1
Ds := 2*π
λ := 1
S(ω) := 2*λ/(λ^2 + ω^2)
A := [-1, 2, -4; -2, 0, -1; 4, -1, -6]
B := [0; 1; -1]
C := [1, 0, 0]
D := [0]
r := eigenvals(A) = [-2 + 3i; -2 - 3i; -3]
n := cols(A) = 3
H := identity(cols(A)) = [1, 0, 0; 0, 1, 0; 0, 0, 1]
H(p) := p*H - A → [p + 1, -2, 4; 2, p, 1; -4, 1, p + 6]
H1(p) := H(p)^-1
H1(p) → [
    (p^2 + 6*p - 1)/(p^3 + 7*p^2 + 25*p + 39), (2*p + 16)/(p^3 + 7*p^2 + 25*p + 39), -(4*p + 2)/(p^3 + 7*p^2 + 25*p + 39);
    -(2*p + 16)/(p^3 + 7*p^2 + 25*p + 39), (p^2 + 7*p + 22)/(p^3 + 7*p^2 + 25*p + 39), -(p - 7)/(p^3 + 7*p^2 + 25*p + 39);
    (4*p + 2)/(p^3 + 7*p^2 + 25*p + 39), -(p - 7)/(p^3 + 7*p^2 + 25*p + 39), (p^2 + p + 4)/(p^3 + 7*p^2 + 25*p + 39)
]
W(p) := C*H1(p)*B + D simplify → [6/(p^2 + 4*p + 13)]
i := sqrt(-1)
W(p) substitute, p == i*ω → [6/(13 - ω^2 + 4i*ω)]
W(i*ω) simplify → [6/(13 - ω^2 + 4i*ω)]
W(p) substitute, p == -i*ω → [-6/(ω^2 - 13 + 4i*ω)]
W(-i*ω) simplify → [6*(13 - ω^2 + 4i*ω)/(ω^4 - 10*ω^2 + 169)]
V1(ω) := 6/(13 - ω^2 + 4*i*ω)
V2(ω) := 6*(13 - ω^2 + 4*i*ω)/(ω^4 - 10*ω^2 + 169)
V3(ω) := transpose(V2(ω))
V3(ω) → transpose((78 - 6*ω^2 + 24i*ω)/(ω^4 - 10*ω^2 + 169))
Spectr(ω) := V1(ω)*V3(ω) → 6*transpose((78 - 6*ω^2 + 24i*ω)/(ω^4 - 10*ω^2 + 169))/(13 - ω^2 + 4i*ω)
Sy(ω) := S(ω)*Spectr(ω) → 12*transpose((78 - 6*ω^2 + 24i*ω)/(ω^4 - 10*ω^2 + 169))/((ω^2 + 1)*(13 - ω^2 + 4i*ω))
Sy1(ω) := Sy(ω)[1, 1]
Sy1(ω) → (12*transpose((78 - 6*ω^2 + 24i*ω)/(ω^4 - 10*ω^2 + 169))/((ω^2 + 1)*(13 - ω^2 + 4i*ω)))[1, 1]
Sy1(ω) := 12*(78 - 6*ω^2 + 24i*ω)/(ω^4 - 10*ω^2 + 169)/((ω^2 + 1)*(13 - ω^2 + 4i*ω))
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