ORIGIN := 1
A := [0, 1; -12, -7]
B := [1; 1]
C := [1, 0]
I := identity(2) = [1, 0; 0, 1]
r := eigenvals(A)
R := [-1; -1]
M(p) := p*I - A → [p, -1; 12, p + 7]
N(p) := M(p)^-1 → [
    (p + 7)/(p^2 + 7*p + 12), 1/(p^2 + 7*p + 12);
    -1/(p^2/12 + 7*p/12 + 1), p/(12*(p^2/12 + 7*p/12 + 1))
]
W(p) := C*N(p)*B → 1/(p^2 + 7*p + 12) + (p + 7)/(p^2 + 7*p + 12)
W(p) simplify → (p + 8)/((p + 3)*(p + 4))
i := sqrt(-1)
W(p) substitute, p == i*ω → -(ω^2 - 96 + 44i*ω + ω^3*1i)/(ω^4 + 25*ω^2 + 144)
W(i*ω) simplify → -(-15 + 5i*ω)/(ω^2 + 9) + (-16 + 4i*ω)/(ω^2 + 16)
W(p) substitute, p == -i*ω → (96 - ω^2 + 44i*ω + ω^3*1i)/(ω^4 + 25*ω^2 + 144)
W(-i*ω) simplify → (15 + 5i*ω)/(ω^2 + 9) - (16 + 4i*ω)/(ω^2 + 16)
V(ω) := -(9 + 3i*ω)/(ω^2 + 9) + (8 + 2i*ω)/(ω^2 + 16)
V1(ω) := (-9 + 3i*ω)/(ω^2 + 9) - (-8 + 2i*ω)/(ω^2 + 16)
Su := 1
Sy(ω) := V(ω)*Su*V1(ω) → -((-9 + 3i*ω)/(ω^2 + 9) - (-8 + 2i*ω)/(ω^2 + 16))*((9 + 3i*ω)/(ω^2 + 9) - (8 + 2i*ω)/(ω^2 + 16))
integral(Sy(ω), ω = -∞ .. ∞) → 4*π/7
Dy := 19*π/16 = 3.73064
