f1(t) := t
f2(t) := t^4
f3(t) := 7 - t
MU := 0
MV := 0
DU := 1
DV := 1
DUV := 0
X(t) := U*f1(t) + V*f2(t) + f3(t)  # error: Эта переменная не определена.
# Задание 1
MX(t) := f1(t)*MU + f2(t)*MV + f3(t) → 7 - t
X(t1)*X(t2) → (V*t1^4 - t1 + U*t1 + 7)*(V*t2^4 - t2 + U*t2 + 7) expand → U^2*t1*t2 + U*V*t1^4*t2 + U*V*t1*t2^4 - 2*U*t1*t2 + 7*U*t1 + 7*U*t2 + V^2*t1^4*t2^4 - V*t1^4*t2 + 7*V*t1^4 - V*t1*t2^4 + 7*V*t2^4 + t1*t2 - 7*t1 - 7*t2 + 49 simplify → (V*t1^4 - t1 + U*t1 + 7)*(V*t2^4 - t2 + U*t2 + 7)
MX(t1)*MX(t2) → (t1 - 7)*(t2 - 7) expand → t1*t2 - 7*t2 - 7*t1 + 49 simplify → (t1 - 7)*(t2 - 7)
KX(t1, t2) := DU*f1(t1)*f1(t2) + DV*f2(t1)*f2(t2) + DUV*(f1(t1)*f2(t2) + f1(t2)*f2(t1)) → t1^4*t2^4 + t1*t2
DX(t) := KX(t, t) → t^8 + t^2
# Задание 2
MY1(t) := d/dt(MX(t)) → -1
KY1(t1, t2) := d/dt1(d/dt2(KX(t1, t2))) → 16*t1^3*t2^3 + 1 simplify → 16*t1^3*t2^3 + 1
DY1(t) := KY1(t, t) → 16*t^6 + 1 simplify → 16*t^6 + 1
# Задание 3
MY2(t) := MX(t) + d/dt(MX(t)) → 6 - t
KY2(t1, t2) := KX(t1, t2) + d/dt1(KX(t1, t2)) + d/dt2(KX(t1, t2)) + d/dt1(d/dt2(KX(t1, t2))) → t1^4*t2^4 + 4*t1^4*t2^3 + 4*t1^3*t2^4 + 16*t1^3*t2^3 + t1*t2 + t1 + t2 + 1 simplify → t1^4*t2^4 + 4*t1^4*t2^3 + 4*t1^3*t2^4 + 16*t1^3*t2^3 + t1*t2 + t1 + t2 + 1
DY2(t) := KY2(t, t) simplify → t^8 + 8*t^7 + 16*t^6 + t^2 + 2*t + 1
# Задание 4
F(t) := integral(MX(t), t) → 7*t - t^2/2
F(0) → 0
MY3(t) := F(t) - F(0) → 7*t - t^2/2
# Вычисляем двойной интеграл
FK(t1, t2) := integral(KX(t1, t2), t2) → t1^4*t2^5/5 + t1*t2^2/2 simplify → t1*t2^2*(2*t1^3*t2^3 + 5)/10
FK(t1, 0) → 0 simplify → 0
fk(t1, t2) := FK(t1, t2) - FK(t1, 0) → t1*t2^2*(2*t1^3*t2^3 + 5)/10
F2K(t1, t2) := integral(fk(t1, t2), t1) → t1^5*t2^5/25 + t1^2*t2^2/4 simplify → t1^2*t2^2*(4*t1^3*t2^3 + 25)/100
F2K(0, t2) → 0
KY3(t1, t2) := F2K(t1, t2) - F2K(0, t2) → t1^2*t2^2*(4*t1^3*t2^3 + 25)/100
KY3(t, t) → t^4*(4*t^6 + 25)/100 simplify → t^4*(4*t^6 + 25)/100
DY3(t) := KY3(t, t) simplify → t^4*(4*t^6 + 25)/100
# Задание 5
RXY1(t1, t2) := d/dt2(KX(t1, t2)) → 4*t1^4*t2^3 + t1
RY1X(t1, t2) := d/dt1(KX(t1, t2)) → 4*t1^3*t2^4 + t2
