α := 1
β := 9
D := 3
Kx1(τ) := D*e^(-α*|τ|)*(cos(β*τ) - α/β*sin(β*|τ|)) → 3*e^(-|τ|)*(cos(9*τ) - sin(9*|τ|)/9)
# Найдем спектральную плотность входного ССП
Sx1(ω) := 1/(2*π)*integral(Kx1(τ)*e^(-1i*ω*τ), τ = -∞ .. ∞) → 6*ω^2/(π*(ω^4 - 160*ω^2 + 6724))
Sx1(ω) → 6*ω^2/(π*(ω^4 - 160*ω^2 + 6724)) parfrac → ω/(6*π*(ω^2 - 18*ω + 82)) - ω/(6*π*(ω^2 + 18*ω + 82))
a1 := 4
b1 := 3
a2 := 2
b2 := 6
# Найдем квадрат модуля частотной характеристики системы
Φ2_1(ω) := (b2^2 + (a2*ω)^2)/(b1^2 + (a1*ω)^2) → (4*ω^2 + 36)/(16*ω^2 + 9)
# Найдем спектральную плотность на выходе системы
Sy1(ω) := Φ2_1(ω)*Sx1(ω) → 6*ω^2*(4*ω^2 + 36)/(π*(16*ω^2 + 9)*(ω^4 - 160*ω^2 + 6724))
Sy1(ω) → 6*ω^2*(4*ω^2 + 36)/(π*(16*ω^2 + 9)*(ω^4 - 160*ω^2 + 6724)) parfrac → (39214*ω + 79704)/(1046679*π*(ω^2 - 18*ω + 82)) - (39214*ω - 79704)/(1046679*π*(ω^2 + 18*ω + 82)) - 5832/(348893*π*(16*ω^2 + 9))
Sy1(ω) expand; simplify → 24*ω^2*(ω^2 + 9)/(π*(16*ω^6 - 2551*ω^4 + 106144*ω^2 + 60516))
Root := polyroots([60516; 0; 106144; 0; -2551; 0; 16]) = [-9 + 1i; -9 - 1i; -0.75i; 0.75i; 9 + 1i; 9 - 1i]
π*(16*ω^6 - 2551*ω^4 + 106144*ω^2 + 60516)
16*ω^6 + 0 - 2551*ω^4 + 0 + 106144*ω^2 + 0 + 60516
# Найдем корреляционную функцию выходного ССП
# Вычет в полюсе ω1
ω1 := 0.75i
e1(τ) := e^(1i*ω1*τ) → e^(-0.75*τ)
res1(τ) := e1(τ)*limit(Sy1(ω)*(ω - ω1), ω → ω1) → 0.000221699209622i*e^(-0.75*τ)
# Вычет в полюсе ω2
ω2 := 9 + 1i
e2(τ) := e^(1i*ω2*τ) → e^((-1 + 9i)*τ)
res2(τ) := e2(τ)*limit(Sy1(ω)*(ω - ω2), ω → ω2) → e^((-1 + 9i)*τ)*(19607/1046679 - 72105/348893*1i)/π
# Вычет в полюсе ω3
ω3 := -9 + 1i
e3(τ) := e^(1i*ω3*τ) → e^((-1 - 9i)*τ)
res3(τ) := e3(τ)*limit(Sy1(ω)*(ω - ω3), ω → ω3) → e^((-1 - 9i)*τ)*(-19607/1046679 - 72105/348893*1i)/π
JJ1(τ) := 2*π*1i*(res1(τ) + res2(τ) + res3(τ)) simplify → 0.826671787625*cos(9*τ)*e^(-τ) - 0.00139297721651*e^(-0.75*τ) - 0.0749303272541*sin(9*τ)*e^(-τ)
Ky1(τ) := JJ1(|τ|) → -0.00139297721651*e^(-0.75*|τ|) + (-0.0749303272541*sin(9*|τ|)*e^(-|τ|)) + 0.826671787625*cos(9*|τ|)*e^(-|τ|)
D1 := Ky1(0) → 0.825278810409 = 0.825279
D11 := 2*integral(Sy1(ω), ω = 0 .. ∞) = 0.825279
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