f1(t) := cos(t)
f2(t) := -t^2
f3(t) := -4
MU := 0
MV := 0
DU := 2
DV := 4
DUV := 0
X(t) := U*f1(t) + V*f2(t) + f3(t)  # error: Эта переменная не определена.
X(t) → U*cos(t) - V*t^2 - 4
# Задание 1
MX(t) := f1(t)*MU + f2(t)*MV + f3(t) → -4
X(t1)*X(t2) → (V*t1^2 - U*cos(t1) + 4)*(V*t2^2 - U*cos(t2) + 4) expand → 4*V*t1^2 + 4*V*t2^2 - 4*U*cos(t1) - 4*U*cos(t2) + V^2*t1^2*t2^2 + U^2*cos(t1)*cos(t2) - U*V*t1^2*cos(t2) - U*V*t2^2*cos(t1) + 16 simplify → (V*t1^2 - U*cos(t1) + 4)*(V*t2^2 - U*cos(t2) + 4)
MX(t1)*MX(t2) → 16 expand → 16 simplify → 16
KX(t1, t2) := DU*f1(t1)*f1(t2) + DV*f2(t1)*f2(t2) + DUV*(f1(t1)*f2(t2) + f1(t2)*f2(t1)) → 4*t1^2*t2^2 + 2*cos(t1)*cos(t2)
DX(t) := KX(t, t) → 4*t^4 + 2*cos(t)^2
# Задание 2
MY1(t) := d/dt(MX(t)) → 0
KY1(t1, t2) := d/dt1(d/dt2(KX(t1, t2))) → 16*t1*t2 + 2*sin(t1)*sin(t2) simplify → 16*t1*t2 + 2*sin(t1)*sin(t2)
DY1(t) := KY1(t, t) → 16*t^2 + 2*sin(t)^2 simplify → 16*t^2 + 2*sin(t)^2
# Задание 3
MY2(t) := MX(t) + d/dt(MX(t)) → -4
KY2(t1, t2) := KX(t1, t2) + d/dt1(KX(t1, t2)) + d/dt2(KX(t1, t2)) + d/dt1(d/dt2(KX(t1, t2))) → 8*t1*t2^2 + 8*t1^2*t2 + 4*t1^2*t2^2 + 16*t1*t2 + 2*cos(t1)*cos(t2) - 2*cos(t1)*sin(t2) - 2*cos(t2)*sin(t1) + 2*sin(t1)*sin(t2) simplify → 2*cos(t1 - t2) - 2*sin(t1 + t2) + 8*t1*t2^2 + 8*t1^2*t2 + 4*t1^2*t2^2 + 16*t1*t2
DY2(t) := KY2(t, t) simplify → 16*t^2 - 2*sin(2*t) + 16*t^3 + 4*t^4 + 2
# Задание 4
F(t) := integral(MX(t), t) → -4*t
F(0) → 0
MY3(t) := F(t) - F(0) → -4*t
# Вычисляем двойной интеграл
FK(t1, t2) := integral(KX(t1, t2), t2) → sin(t1 + t2) - sin(t1 - t2) + 4*t1^2*t2^3/3 simplify → 4*t1^2*t2^3/3 + 2*cos(t1)*sin(t2)
FK(t1, 0) → 0 simplify → 0
fk(t1, t2) := FK(t1, t2) - FK(t1, 0) → 4*t1^2*t2^3/3 + 2*cos(t1)*sin(t2)
F2K(t1, t2) := integral(fk(t1, t2), t1) → cos(t2 - t1) - cos(t1 + t2) + 4*t1^3*t2^3/9 simplify → 4*t1^3*t2^3/9 + 2*sin(t1)*sin(t2)
F2K(0, t2) → 0
KY3(t1, t2) := F2K(t1, t2) - F2K(0, t2) → 4*t1^3*t2^3/9 + 2*sin(t1)*sin(t2)
KY3(t, t) → 4*t^6/9 + 2*sin(t)^2 simplify → 4*t^6/9 + 2*sin(t)^2
DY3(t) := KY3(t, t) simplify → 4*t^6/9 + 2*sin(t)^2
# Задание 5
RXY1(t1, t2) := d/dt2(KX(t1, t2)) → 8*t1^2*t2 - 2*cos(t1)*sin(t2)
RY1X(t1, t2) := d/dt1(KX(t1, t2)) → 8*t1*t2^2 - 2*cos(t2)*sin(t1)
