ORIGIN := 1
α := 3
β := 10
D := 8
Kx1(τ) := D*e^(-α*|τ|)*(cos(β*τ) + α/β*sin(β*|τ|)) → 8*e^(-3*|τ|)*(cos(10*τ) + 3*sin(10*|τ|)/10)
# Найдем спектральную плотность входного ССП
Sx1(ω) := 1/(2*π)*integral(Kx1(τ)*e^(-1i*ω*τ), τ = -∞ .. ∞) → 5232/(π*(ω^4 - 182*ω^2 + 11881))
Sx1(ω) → 5232/(π*(ω^4 - 182*ω^2 + 11881)) parfrac → (6*ω + 120)/(5*π*(ω^2 + 20*ω + 109)) - (6*ω - 120)/(5*π*(ω^2 - 20*ω + 109))
a1 := 6
b1 := 4
a2 := 3
b2 := 2
# Найдем квадрат модуля частотной характеристики системы
Φ2_1(ω) := (b2^2 + (a2*ω)^2)/(b1^2 + (a1*ω)^2) → (9*ω^2 + 4)/(36*ω^2 + 16)
(9*ω^2 + 4)/(36*ω^2 + 16) simplify → 1/4
# Найдем спектральную плотность на выходе системы
Sy1(ω) := Φ2_1(ω)*Sx1(ω) → 5232*(9*ω^2 + 4)/(π*(36*ω^2 + 16)*(ω^4 - 182*ω^2 + 11881))
Sy1(ω) → (47088*ω^2 + 20928)/(π*(36*ω^2 + 16)*(ω^4 - 182*ω^2 + 11881)) parfrac → (3*ω + 60)/(10*π*(ω^2 + 20*ω + 109)) - (3*ω - 60)/(10*π*(ω^2 - 20*ω + 109))
Sy1(ω) expand; simplify → 1308/(π*(ω^4 - 182*ω^2 + 11881))
ROOT := π*(ω^4 - 182*ω^2 + 11881) solve → [10 + 3i; -10 + 3i; 10 - 3i; -10 - 3i]
# Найдем корреляционную функцию выходного ССП
# Вычет в полюсе ω1
ω1 := ROOT[1]
e1(τ) := e^(1i*ω1*τ) → e^((-3 + 10i)*τ)
res1(τ) := limit(Sy1(ω)*(ω - ω1)*e1(τ), ω → ω1) → e^((-3 + 10i)*τ)*(-3/20 - 1/2*1i)/π
# Вычет в полюсе ω2
ω2 := ROOT[2]
e2(τ) := e^(1i*ω2*τ) → e^((-3 - 10i)*τ)
res2(τ) := limit(Sy1(ω)*(ω - ω2)*e2(τ), ω → ω2) → e^((-3 - 10i)*τ)*(3/20 - 1/2*1i)/π
JJ1(τ) := 2*π*1i*(res1(τ) + res2(τ)) simplify; float, 3 → 0.2*e^(-3.0*τ)*(10.0*cos(10.0*τ) + 3.0*sin(10.0*τ))
Ky1(τ) := JJ1(|τ|) → 0.2*e^(-3.0*|τ|)*(10.0*cos(10.0*|τ|) + 3.0*sin(10.0*|τ|))
D1 := Ky1(0) → 2.0 = 2
D11 := 2*integral(Sy1(ω), ω = 0 .. ∞) = 2
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