ORIGIN := 1
X1 := [9.8; 9.8; 8.6; 8.6; 9.2; 9.2; 9.8; 9; 10; 9.4; 9; 11.2; 10.8]
X2 := [8.6; 9.2; 10.4; 9; 9.8; 9.2; 9.6; 10; 9.8; 9; 9.8; 8.7; 8.6]
X3 := [7; 10; 14; 15; 12; 16; 12; 11; 12; 16; 13; 18; 15; 13]
n := length(X1) = 13
z := X2 - X1 = [-1.2; -0.6; 1.8; 0.4; 0.6; 0; -0.2; 1; -0.2; -0.4; 0.8; -2.5; -2.2]
B(z) :=
    n ← 0
    for i ∈ 1 .. length(z)
        n ← n + 1 if z[i] > 0
    n
i := 1 .. n
mean(X3) = 13.1429
p := 0.5
alfa := 0.05
a1 := alfa/2 = 0.025
beta := 1 - a1 = 0.975
bleft := qbinom(a1, n, p) = 3
B := B(z) = 5
bright := qbinom(beta, n, p) = 10
zright := qnorm(beta - a1, 0, 1) = 1.64485
zright = 1.64485
statT(x) :=
    n ← rows(x)
    for i ∈ 1 .. n
        y[i] ← x[i]
    for i ∈ 1 .. n - 1
        for j ∈ i + 1 .. n
            a ← y[i]
            if |y[j]| < |y[i]|
                y[i] ← y[j]
                y[j] ← a
    j ← 0
    for i ∈ 1 .. n
        continue if |y[i]| < 10^-5
        j ← j + 1
        ff[j] ← if(y[i] < 0, 0, 1)
        z[j] ← |y[i]|
    T ← 0
    for i ∈ 1 .. j
        T ← T + i*ff[i]
    [T; z]
arm := sqrt((4*B + 3)*(1 - p)) - sqrt((4*n - 4*B - 1)*p) = -0.545839
pValue := 1 - pnorm(arm, 0, 1) = 0.707412
T := statT(z)[1] = 34
z = [-1.2; -0.6; 1.8; 0.4; 0.6; 0; -0.2; 1; -0.2; -0.4; 0.8; -2.5; -2.2]
zz := statT(z)[2] = [0.2; 0.2; 0.4; 0.4; 0.6; 0.6; 0.8; 1; 1.2; 1.8; 2.2; 2.5]
n1 := rows(zz) = 12
MT := n1*(n1 + 1)/4 = 39
DT := MT*(2*n + 1)/6 = 175.5
T1 := (T - MT)/sqrt(DT) = -0.377426
pValue := 1 - pnorm(T1, 0, 1) = 0.647071
T1 = -0.377426
zright = 1.64485
