ORIGIN := 1
Ds := 2*π
λ := 3
S(ω) := 2*λ/(λ^2 + ω^2)
A := [4, -3, -9; 3, -5, -6; 9, -6, -11]
B := [1; 1; 1]
C := [1, 0, 0; 0, 2, 1]
D := [0; 0]
σ := sqrt(2*π)
r := eigenvals(A)
r = [-8; -2 + 3i; -2 - 3i]
n := cols(A)
n = 3
H := identity(cols(A))
H = [1, 0, 0; 0, 1, 0; 0, 0, 1]
H(p) := p*H - A
H(p) → [p - 4, 3, 9; -3, p + 5, 6; -9, 6, p + 11]
H1(p) := H(p)^-1
H1(p) → [
    (p^2 + 16*p + 19)/(p^3 + 12*p^2 + 45*p + 104), -(3*p - 21)/(p^3 + 12*p^2 + 45*p + 104), -(9*p + 27)/(p^3 + 12*p^2 + 45*p + 104);
    (3*p - 21)/(p^3 + 12*p^2 + 45*p + 104), (p^2 + 7*p + 37)/(p^3 + 12*p^2 + 45*p + 104), -(6*p + 3)/(p^3 + 12*p^2 + 45*p + 104);
    (6*p + 3)*(3*p + 9)/((2*p + 1)*(p^3 + 12*p^2 + 45*p + 104)), -(6*p + 3)/(p^3 + 12*p^2 + 45*p + 104), (p^2 + p - 11)/(p^3 + 12*p^2 + 45*p + 104)
]
H1(p) simplify → [
    (2*p + 4)/(p^2 + 4*p + 13) - 1/(p + 8), -3*(p - 7)/((p + 8)*(p^2 + 4*p + 13)), -9*(p + 3)/((p + 8)*(p^2 + 4*p + 13));
    3*(p - 7)/((p + 8)*(p^2 + 4*p + 13)), 3/(p^2 + 4*p + 13) + 1/(p + 8), -3*(2*p + 1)/((p + 8)*(p^2 + 4*p + 13));
    9*(p + 3)/((p + 8)*(p^2 + 4*p + 13)), -3*(2*p + 1)/((p + 8)*(p^2 + 4*p + 13)), 1/(p + 8) - 3/(p^2 + 4*p + 13)
]
W(p) := C*H1(p)*B + D
W(p) simplify → [1/(p + 8); 3/(p + 8)]
i := sqrt(-1)
W(p) substitute, p == i*ω → [-(-8 + ω*1i)/(ω^2 + 64); -3*(-8 + ω*1i)/(ω^2 + 64)]
W(p) substitute, p == -i*ω → [(8 + ω*1i)/(ω^2 + 64); (24 + 3i*ω)/(ω^2 + 64)]
V1(ω) := -6*(ω^2 - 13 + 4i*ω)/(ω^4 - 10*ω^2 + 169)
V2(ω) := [6*(13 - ω^2 + 4i*ω)/(ω^4 - 10*ω^2 + 169)]
V3(ω) := transpose(V2(ω))
V3(ω) → [(78 - 6*ω^2 + 24i*ω)/(ω^4 - 10*ω^2 + 169)]
Spectr(ω) := V1(ω)*V3(ω)
Spectr(ω) → [-(78 - 6*ω^2 + 24i*ω)*(6*ω^2 - 78 + 24i*ω)/(ω^4 - 10*ω^2 + 169)^2]
Sy(ω) := S(ω)*Spectr(ω)
Sy(ω) → [-6*(78 - 6*ω^2 + 24i*ω)*(6*ω^2 - 78 + 24i*ω)/((ω^2 + 9)*(ω^4 - 10*ω^2 + 169)^2)]
Sy1(ω) := Sy(ω)[1, 1]
Sy1(ω) → -6*(78 - 6*ω^2 + 24i*ω)*(6*ω^2 - 78 + 24i*ω)/((ω^2 + 9)*(ω^4 - 10*ω^2 + 169)^2)
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# ЛАБОРАТОРНАЯ 2
ORIGIN := 1
A := [0, 1; -24, -10]
B := [1; 1]
C := [1, 0]
I := identity(2)
I = [1, 0; 0, 1]
r := eigenvals(A)
r = [-4; -6]
M(p) := p*I - A
M(p) → [p, -1; 24, p + 10]
N(p) := M(p)^-1
N(p) → [(p + 10)/(p^2 + 10*p + 24), 1/(p^2 + 10*p + 24); -1/(p^2/24 + 5*p/12 + 1), p/(p^2 + 10*p + 24)]
W(p) := C*N(p)*B
W(p) → 1/(p^2 + 10*p + 24) + (p + 10)/(p^2 + 10*p + 24)
W(p) simplify → (p + 11)/((p + 4)*(p + 6))
i := sqrt(-1)
W(p) substitute, p == i*ω → -(ω^2 - 264 + 86i*ω + ω^3*1i)/(ω^4 + 52*ω^2 + 576)
W(i*ω) simplify → -(-14 + 7i*ω/2)/(ω^2 + 16) + (-15 + 5i*ω/2)/(ω^2 + 36)
W(p) substitute, p == -i*ω → (264 - ω^2 + 86i*ω + ω^3*1i)/(ω^4 + 52*ω^2 + 576)
W(-i*ω) simplify → (14 + 7i*ω/2)/(ω^2 + 16) - (15 + 5i*ω/2)/(ω^2 + 36)
V(ω) := (-2 + 2i*ω)/(ω^2 + 1) + (-3 + ω*1i)/(ω^2 + 9)
V1(ω) := (2 + 2i*ω)/(ω^2 + 1) - (3 + ω*1i)/(ω^2 + 9)
Su := 1
Su(ω) := V(ω)*Su*V1(ω)
Su(ω) → ((-2 + 2i*ω)/(ω^2 + 1) + (-3 + ω*1i)/(ω^2 + 9))*((2 + 2i*ω)/(ω^2 + 1) - (3 + ω*1i)/(ω^2 + 9))
f1(ω) := ω^2 + 9
f2(ω) := ω^4 + 2*ω^2 + 1
integral(Sy(ω), ω = -∞ .. ∞) → [63*π/221]
Dy := 5*π/13
Dy = 1.2083
