ORIGIN := 1
A1 := [0, 1; -24, -10]
B := [1; 1]
C := [1, 0]
A := A1/2
I := identity(2)
I = [1, 0; 0, 1]
r := eigenvals(A)
r = [-2; -3]
M(p) := p*I - A
M(p) → [p, -1/2; 12, p + 5]
N(p) := M(p)^-1
N(p) → [(p + 5)/(p^2 + 5*p + 6), 1/(2*p^2 + 10*p + 12); -1/(p^2/12 + 5*p/12 + 1/2), p/(p^2 + 5*p + 6)]
W(p) := C*N(p)*B
W(p) → (p + 5)/(p^2 + 5*p + 6) + 1/(2*p^2 + 10*p + 12)
W(p) simplify → 7/(2*(p + 2)) - 5/(2*(p + 3))
i := sqrt(-1)
V(ω) := -(ω^2 - 264 + 86i*ω + ω^3*1i)/(ω^4 + 52*ω^2 + 576)
W(p) substitute, p == i*ω → -(ω^2 - 66 + 43i*ω + 2i*ω^3)/(2*(ω^4 + 13*ω^2 + 36))
V1(ω) := (264 - ω^2 + 86i*ω + ω^3*1i)/(ω^4 + 52*ω^2 + 576)
W(p) substitute, p == -i*ω → (66 - ω^2 + 43i*ω + 2i*ω^3)/(2*(ω^4 + 13*ω^2 + 36))
V(ω) := W(p) substitute, p == i*ω → -(ω^2 - 66 + 43i*ω + 2i*ω^3)/(2*(ω^4 + 13*ω^2 + 36))
V1(ω) := W(p) substitute, p == -i*ω → (66 - ω^2 + 43i*ω + 2i*ω^3)/(2*(ω^4 + 13*ω^2 + 36))
Su := 1
Sy(ω) := V(ω)*Su*V1(ω)
Sy(ω) → -(66 - ω^2 + 43i*ω + 2i*ω^3)*(ω^2 - 66 + 43i*ω + 2i*ω^3)/(2*ω^4 + 26*ω^2 + 72)^2 simplify → 21/(4*(ω^2 + 4)) - 17/(4*(ω^2 + 9))
integral(Sy(ω), ω = -∞ .. ∞) → 29*π/24
Dy := 29*π/48
Dy = 1.89805
Dy2 := 29*π/24
Dy2 = 3.79609
