ORIGIN := 1
x := [1.1; 2.2; 3.3; 4.4; 5.5; 6.6; 7.7; 8.8; 9.9; 11.0]
y := [-2.96; -2.68; -2.41; -2.37; -1.98; -1.73; -1.39; -1.29; -0.85; -0.69]
n := rows(x) = 10
a := intercept(x, y) = -3.236
b := slope(x, y) = 0.23157
M[:, 1] := x
M[:, 2] := y
M := csort(M, 1)
x := M[:, 1]
y := M[:, 2]
i := 1 .. n
yr[i] := a + b*x[i]
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xmean := mean(x) = 6.05
ymean := mean(y) = -1.835
β1 := 0.9
α1 := 1 - β1 = 0.1
t := qt(1 - α1/2, n - 2) = 1.85955
D1 := 1/(n - 2)*sum((y[k] - yr[k])^2, k = 1 .. n)
D1 = 0.00646955
aleft := a - t*sqrt(D1/(n - 2)) = -3.28888
aright := a + t*sqrt(D1/(n - 2)) = -3.18312
εb := sqrt(n/(n - 2)*D1/sum((x[k] - xmean)^2, k = 1 .. n)) = 0.00900062
bleft := b - t*εb = 0.214833
bright := b + t*εb = 0.248307
ε[i] := y[i] - yr[i]
i := 1 .. n
yleft[i] := yr[i] - t*sqrt(D1/(n - 2)*(1 + n*(x[i] - xmean)^2/sum((x[k] - xmean)^2, k = 1 .. n)))
yright[i] := yr[i] + t*sqrt(D1/(n - 2)*(1 + n*(x[i] - xmean)^2/sum((x[k] - xmean)^2, k = 1 .. n)))
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yr[i] = [-2.98127; -2.72655; -2.47182; -2.21709; -1.96236; -1.70764; -1.45291; -1.19818; -0.943455; -0.688727]
x[i] = [1.1; 2.2; 3.3; 4.4; 5.5; 6.6; 7.7; 8.8; 9.9; 11]
