ORIGIN := 1
X1 := [7; 10; 14; 15; 12; 16; 12]
X2 := [11; 12; 16; 13; 18; 15; 13]
n := length(X1) = 7
X3 := [7; 10; 14; 15; 12; 16; 12; 11; 12; 16; 13; 18; 15; 13]
i := 1 .. n
z := X2 - X1 = [4; 2; 2; -2; 6; -1; 1]
B(z) :=
    n ← 0
    for i ∈ 1 .. length(z)
        n ← n + 1 if z[i] > 0
    n
mean(X3) = 13.1429
p := 0.5
alfa := 0.05
a1 := alfa/2 = 0.025
beta := 1 - a1 = 0.975
bleft := qbinom(a1, n, p) = 1
B := B(z) = 5
bright := qbinom(beta, n, p) = 6
zright := qnorm(beta - a1, 0, 1) = 1.64485
zright = 1.64485
statT(x) :=
    n ← rows(x)
    for i ∈ 1 .. n
        y[i] ← x[i]
    for i ∈ 1 .. n - 1
        for j ∈ i + 1 .. n
            a ← y[i]
            if |y[j]| < |y[i]|
                y[i] ← y[j]
                y[j] ← a
    j ← 0
    for i ∈ 1 .. n
        continue if |y[i]| < 10^-5
        j ← j + 1
        ff[j] ← if(y[i] < 0, 0, 1)
        z[j] ← |y[i]|
    T ← 0
    for i ∈ 1 .. j
        T ← T + i*ff[i]
    [T; z]
arm := sqrt((4*B + 3)*(1 - p)) - sqrt((4*n - 4*B - 1)*p) = 1.52034
pValue := 1 - pnorm(arm, 0, 1) = 0.0642132
T := statT(z)[1] = 24
z = [4; 2; 2; -2; 6; -1; 1]
zz := statT(z)[2] = [1; 1; 2; 2; 2; 4; 6]
n1 := rows(zz) = 7
MT := n1*(n1 + 1)/4 = 14
DT := MT*(2*n + 1)/6 = 35
T1 := (T - MT)/sqrt(DT) = 1.69031
pValue := 1 - pnorm(T1, 0, 1) = 0.0454845
T1 = 1.69031
zright = 1.64485
