ORIGIN := 1
X1 := [36.4; 37.5; 36.9; 37.6; 38.1; 35.5; 37.8; 38.3; 36.6]
X2 := [36.8; 39.2; 37.6; 39.9; 39.6; 34.2; 36.5; 36.3; 39.8]
n := length(X1) = 9
i := 1 .. n
z := X2 - X1 = [0.4; 1.7; 0.7; 2.3; 1.5; -1.3; -1.3; -2; 3.2]
B(z) :=
    n ← 0
    for i ∈ 1 .. length(z)
        n ← n + 1 if z[i] > 0
    n
p := 0.5
B := B(z) = 6
alfa := 0.05
a1 := alfa/2 = 0.025
beta := 1 - a1 = 0.975
b := qbinom(beta, n, p) = 7
b1 := qbinom(a1, n, p) = 2
zright := qnorm(beta, 0, 1) = 1.95996
zleft := -zright
arm := sqrt((4*B + 3)*(1 - p)) - sqrt((4*n - 4*B - 1)*p) = 1.32903
pValue := 1 - pnorm(arm, 0, 1) = 0.0919196
statT(x) :=
    n ← rows(x)
    for i ∈ 1 .. n
        y[i] ← x[i]
    for i ∈ 1 .. n - 1
        for j ∈ i + 1 .. n
            a ← y[i]
            if |y[j]| < |y[i]|
                y[i] ← y[j]
                y[j] ← a
    j ← 0
    for i ∈ 1 .. n
        continue if |y[i]| < 10^-5
        j ← j + 1
        ff[j] ← if(y[i] < 0, 0, 1)
        z[j] ← |y[i]|
    T ← 0
    for i ∈ 1 .. j
        T ← T + i*ff[i]
    [T; z]
T := statT(z)[1] = 31
z = [0.4; 1.7; 0.7; 2.3; 1.5; -1.3; -1.3; -2; 3.2]
zz := statT(z)[2] = [0.4; 0.7; 1.3; 1.3; 1.5; 1.7; 2; 2.3; 3.2]
n1 := rows(zz) = 9
MT := n1*(n1 + 1)/4 = 22.5
DT := MT*(2*n + 1)/6 = 71.25
T1 := (T - MT)/sqrt(DT) = 1.00699
pValue := 1 - pnorm(T1, 0, 1) = 0.156969
