ORIGIN := 1
μ := 2.5
λ := 0.8
x1 := rweibull(50, λ)
x1 := sort(x1)
f(x) := dweibull(x, λ)
F(x) := pweibull(x, λ)
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x1 = [
    0.000763918; 0.00378971; 0.0207848; 0.0798848; 0.091987; 0.11255; 0.114973; 0.129578; 0.171678; 0.175805
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]
i := 0.1, 0.2 .. 0.9
q[i*10] := qweibull(i, λ)
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m := mean(x1)
m = 1.11848
med := median(x1)
med = 0.575765
D := var(x1)
D = 2.17323
σ := stdev(x1)
σ = 1.47419
xmin := min(x1)
xmax := max(x1)
xmin = 0.000763918
xmax = 6.97748
E := 0.477*sqrt(2)*σ
E = 0.994457
R := xmax - xmin
R = 6.97671
nn := 10
hh := histogram(nn, x1)
hc := R/10
S := sum(hh[:, 2][i]*hc, i = 1 .. 10)
S = 34.8836
S2 := sum(hh[:, 2][i]/S*hc, i = 1 .. 10)
S2 = 1
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