ORIGIN := 1
x := [0.1; 0.2; 0.3; 0.4; 0.5; 0.6; 0.7; 0.8; 0.9; 1.0; 1.1]
y := [24.3; 27.1; 34.7; 39.1; 47.6; 55.4; 59.3; 65.4; 72.8; 77.9; 82.4]
n := rows(x) = 11
a := intercept(x, y) = 16.6018
b := slope(x, y) = 61.1182
M[:, 1] := x
M[:, 2] := y
M := csort(M, 1)
x := M[:, 1]
y := M[:, 2]
i := 1 .. n
yr[i] := a + b*x[i]
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xmean := mean(x) = 0.6
ymean := mean(y) = 53.2727
β1 := 0.9
α1 := 1 - β1 = 0.1
t := qt(1 - α1/2, n - 2) = 1.83311
D1 := 1/(n - 2)*sum((y[k] - yr[k])^2, k = 1 .. n)
D1 = 1.95405
aleft := a - t*sqrt(D1/(n - 2)) = 15.7477
aright := a + t*sqrt(D1/(n - 2)) = 17.456
εb := sqrt(n/(n - 2)*D1/sum((x[k] - xmean)^2, k = 1 .. n)) = 1.47349
bleft := b - t*εb = 58.4171
bright := b + t*εb = 63.8193
ε[i] := y[i] - yr[i]
i := 1 .. n
yleft[i] := yr[i] - t*sqrt(D1/(n - 2)*(1 + n*(x[i] - xmean)^2/sum((x[k] - xmean)^2, k = 1 .. n)))
yright[i] := yr[i] + t*sqrt(D1/(n - 2)*(1 + n*(x[i] - xmean)^2/sum((x[k] - xmean)^2, k = 1 .. n)))
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yr[i] = [22.7136; 28.8255; 34.9373; 41.0491; 47.1609; 53.2727; 59.3845; 65.4964; 71.6082; 77.72; 83.8318]
x[i] = [0.1; 0.2; 0.3; 0.4; 0.5; 0.6; 0.7; 0.8; 0.9; 1; 1.1]
