f1(t) := cos(t)
f2(t) := sin(t)
f3(t) := t
MU := 1
MV := 1
DU := 9
DV := 9
DUV := 4
X(t) := U*f1(t) + V*f2(t) + f3(t) → t + U*cos(t) + V*sin(t)  # error: Эта переменная не определена.
# Задание 1
MX(t) := f1(t)*MU + f2(t)*MV + f3(t) → t + cos(t) + sin(t)
X(t1)*X(t2) → (t1 + U*cos(t1) + V*sin(t1))*(t2 + U*cos(t2) + V*sin(t2)) expand → t1*t2 + U*t1*cos(t2) + U*t2*cos(t1) + V*t1*sin(t2) + V*t2*sin(t1) + U^2*cos(t1)*cos(t2) + V^2*sin(t1)*sin(t2) + U*V*cos(t1)*sin(t2) + U*V*cos(t2)*sin(t1) simplify → (t1 + U*cos(t1) + V*sin(t1))*(t2 + U*cos(t2) + V*sin(t2))
MX(t1)*MX(t2) → (t1 + cos(t1) + sin(t1))*(t2 + cos(t2) + sin(t2)) expand → t1*t2 + t1*cos(t2) + t2*cos(t1) + t1*sin(t2) + t2*sin(t1) + cos(t1)*cos(t2) + cos(t1)*sin(t2) + cos(t2)*sin(t1) + sin(t1)*sin(t2) simplify → (t1 + cos(t1) + sin(t1))*(t2 + cos(t2) + sin(t2))
KX(t1, t2) := DU*f1(t1)*f1(t2) + DV*f2(t1)*f2(t2) + DUV*(f1(t1)*f2(t2) + f1(t2)*f2(t1)) → 9*cos(t1)*cos(t2) + 4*cos(t1)*sin(t2) + 4*cos(t2)*sin(t1) + 9*sin(t1)*sin(t2)
DX(t) := KX(t, t) → 9*cos(t)^2 + 8*cos(t)*sin(t) + 9*sin(t)^2
# Задание 2
MY1(t) := d/dt(MX(t)) → cos(t) - sin(t) + 1
KY1(t1, t2) := d/dt1(d/dt2(KX(t1, t2))) → 9*cos(t1)*cos(t2) - 4*cos(t1)*sin(t2) - 4*cos(t2)*sin(t1) + 9*sin(t1)*sin(t2) simplify → 9*cos(t1 - t2) - 4*sin(t1 + t2)
DY1(t) := KY1(t, t) → 9 - 4*sin(2*t) simplify → 9 - 4*sin(2*t)
# Задание 3
MY2(t) := MX(t) + d/dt(MX(t)) → t + 2*cos(t) + 1
KY2(t1, t2) := KX(t1, t2) + d/dt1(KX(t1, t2)) + d/dt2(KX(t1, t2)) + d/dt1(d/dt2(KX(t1, t2))) → 26*cos(t1)*cos(t2) + 10*sin(t1)*sin(t2) simplify → 18*cos(t1 - t2) + 8*cos(t1 + t2)
DY2(t) := KY2(t, t) simplify → 16*cos(t)^2 + 10
# Задание 4
F(t) := integral(MX(t), t) → sin(t) - cos(t) + t^2/2
F(0) → -1
MY3(t) := F(t) - F(0) → sin(t) - cos(t) + t^2/2 + 1
# Вычисляем двойной интеграл
FK(t1, t2) := integral(KX(t1, t2), t2) → -9*sin(t1 - t2) - 4*cos(t1 + t2) simplify → -9*sin(t1 - t2) - 4*cos(t1 + t2)
FK(t1, 0) → -4*cos(t1) - 9*sin(t1) simplify → -4*cos(t1) - 9*sin(t1)
fk(t1, t2) := FK(t1, t2) - FK(t1, 0) → 4*cos(t1) - 4*cos(t1 + t2) - 9*sin(t1 - t2) + 9*sin(t1)
F2K(t1, t2) := integral(fk(t1, t2), t1) → 9*cos(t2 - t1) - 4*sin(t1 + t2) - 9*cos(t1) + 4*sin(t1) simplify → 9*cos(t1 - t2) - 4*sin(t1 + t2) - 9*cos(t1) + 4*sin(t1)
F2K(0, t2) → 9*cos(t2) - 4*sin(t2) - 9
KY3(t1, t2) := F2K(t1, t2) - F2K(0, t2) → 9*cos(t1 - t2) - 4*sin(t1 + t2) - 9*cos(t1) - 9*cos(t2) + 4*sin(t1) + 4*sin(t2) + 9
KY3(t, t) → 8*sin(t) - 18*cos(t) - 4*sin(2*t) + 18 simplify → 4*sin(t/2)^2*(4*sin(t) + 9)
DY3(t) := KY3(t, t) simplify → 4*sin(t/2)^2*(4*sin(t) + 9)
# Задание 5
RXY1(t1, t2) := d/dt2(KX(t1, t2)) → 4*cos(t1)*cos(t2) - 9*cos(t1)*sin(t2) + 9*cos(t2)*sin(t1) - 4*sin(t1)*sin(t2)
RY1X(t1, t2) := d/dt1(KX(t1, t2)) → 4*cos(t1)*cos(t2) + 9*cos(t1)*sin(t2) - 9*cos(t2)*sin(t1) - 4*sin(t1)*sin(t2)
