α := 12
β := 0
D := 4
Kx1(τ) := D*e^(-α*|τ|)*(1 + α*|τ|) → 4*e^(-12*|τ|)*(12*|τ| + 1)
# Найдем спектральную плотность входного ССП
Sx1(ω) := 1/(2*π)*integral(Kx1(τ)*e^(-1i*ω*τ), τ = -∞ .. ∞) → 13824/(π*(ω^2 + 144)^2)
Sx1(ω) → 13824/(π*(ω^2 + 144)^2) parfrac → 13824*1/π*1/(ω^2 + 144)^2
a1 := 2
b1 := 4
a2 := 3
b2 := 1
# Найдем квадрат модуля частотной характеристики системы
Φ2_1(ω) := (b2^2 + (a2*ω)^2)/(b1^2 + (a1*ω)^2) → (9*ω^2 + 1)/(4*ω^2 + 16)
# Найдем спектральную плотность на выходе системы
Sy1(ω) := Φ2_1(ω)*Sx1(ω) → 13824*(9*ω^2 + 1)/(π*(4*ω^2 + 16)*(ω^2 + 144)^2)
Sy1(ω) → (124416*ω^2 + 13824)/(π*(4*ω^2 + 16)*(ω^2 + 144)^2) parfrac → 216/(35*π*(ω^2 + 144)) - 216/(35*π*(ω^2 + 4)) + 31968/(π*(ω^2 + 144)^2)
Sy1(ω) expand; simplify → 3456*(9*ω^2 + 1)/(π*(ω^2 + 4)*(ω^2 + 144)^2)
polyroots([82944; 0; 21888; 0; 292; 0; 1]) = [-12.0026i; 12.0024i; -11.9974i; 11.9976i; -2i; 2i]
π*(ω^2 + 4)*(ω^2 + 144)^2
(ω^6 + 0 + 292*ω^4 + 0 + 21888*ω^2 + 0 + 82944)
# Найдем корреляционную функцию выходного ССП
# Вычет в полюсе ω1
ω1 := 12i
e1(τ) := e^(1i*ω1*τ) → e^(-12*τ)
res1(τ) := limit(d/dω(Sy1(ω)*(ω - ω1)^2*e^(1i*ω*τ)), ω → ω1) → -(37*e^(-12*Re(τ))*sin(-12i*τ + 12i*Re(τ)) + 37i*e^(-12*Re(τ))*cos(-12i*τ + 12i*Re(τ)))/(8*π) - 8*(333*e^(-12*Re(τ))*sin(-12i*τ + 12i*Re(τ))/280 + 333i*e^(-12*Re(τ))*cos(-12i*τ + 12i*Re(τ))/280)/π + 248832*(e^(-12*Re(τ))*sin(-12i*τ + 12i*Re(τ))/26880 + e^(-12*Re(τ))*cos(-12i*τ + 12i*Re(τ))*1i/26880)/π - τ*(111*e^(-12*Re(τ))*cos(-12i*τ + 12i*Re(τ))/2 - 111i*e^(-12*Re(τ))*sin(-12i*τ + 12i*Re(τ))/2)*1i/π simplify → -e^(-12*τ)*(15540*τ + 1367)*1i/(280*π)
# Вычет в полюсе ω2
ω2 := 2*1i
e2(τ) := e^(1i*ω2*τ) → e^(-2*τ)
res2(τ) := e2(τ)*limit(Sy1(ω)*(ω - ω2), ω → ω2) → 54i*e^(-2*τ)/(35*π)
JJ1(τ) := 2*π*1i*(res1(τ) + res2(τ)) simplify → 1367*e^(-12*τ)/140 - 108*e^(-2*τ)/35 + 111*τ*e^(-12*τ)
Ky1(τ) := JJ1(|τ|) → 1367*e^(-12*|τ|)/140 - 108*e^(-2*|τ|)/35 + 111*e^(-12*|τ|)*|τ|
D1 := Ky1(0) → 187/28 = 6.67857
D11 := 2*integral(Sy1(ω), ω = 0 .. ∞) = 6.67857
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