ORIGIN := 1
m := 2
λ := 0.5
μ := ln(m)
n := 100
MassRand(q, m, σ) :=
    for i ∈ 1 .. q
        r ← runif(12, 0, 1)
        x[i] ← m*e^(σ*(sum(r[j], j = 1 .. 12) - 6))
    x
x := MassRand(n, m, λ)
x := sort(x)
x = [
    0.673205; 0.779521; 0.819535; 0.849129; 0.965554; 0.986932; 1.01501; 1.07355; 1.13735; 1.2323
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]
f(z) := dlnorm(z, μ, λ)
m := mean(x)
mt := e^(μ + λ^2/2)
m = 2.34912
mt = 2.2663
med := median(x)
med = 2.06215
met := e^μ
D := var(x)
D = 1.24887
met = 2
σ := stdev(x)
σ = 1.11753
Dt := e^(2*μ + λ^2)*(e^(λ^2) - 1)
xmin := min(x)
Dt = 1.45878
xmax := max(x)
xmin = 0.673205
xmax = 6.9996
E := 0.477*sqrt(2)*σ
E = 0.753863
R := xmax - xmin
R = 6.32639
nn := 10
hh := histogram(nn, x)
hc := R/10
S := sum(hh[:, 2][i]*hc, i = 1 .. 10)
S = 63.2639
S2 := sum(hh[:, 2][i]/S*hc, i = 1 .. 10)
S2 = 1
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