ORIGIN := 1
n := 100
μ := 2
λ := 1
logis(μ, λ, k) :=
    r ← runif(100, 0, 1)
    for i ∈ 1 .. k
        x[i] ← μ - λ*ln((1 - r[i])/r[i])
    x
z := sort(logis(μ, λ, n))
z = [
    -4.66871; -4.42414; -2.72221; -2.7102; -1.56583; -0.804976; -0.296524; -0.0912826; -0.0526647; -0.00117383
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]
x := rlogis(n, μ, λ)
f(zz) := dlogis(zz, μ, λ)
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# плотность вероятности
F(zz) := plogis(zz, μ, λ)
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# функция распределения
m := mean(z)
m = 1.9567  # мат_ожидание
med := median(z)
med = 2.12613
D := var(z)
D = 3.70979  # дисперсия
σ := stdev(z)
σ = 1.92608
xmin := min(z)
xmin = -4.66871
xmax := max(z)
xmax = 7.74003
E := σ/sqrt(n)
E = 0.192608
R := xmax - xmin
R = 12.4087
N := 1 + 3.322*log(n)
N = 7.644
nn := 10
hh := histogram(nn, z)
hc := R/nn
mteor := μ
mteor = 2
ПРИМЕРНОЕ
Dteor := π^2/3*λ^2
Dteor = 3.28987
S := sum(hh[:, 2][i]*hc, i = 1 .. 10)
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S = 124.087
