ORIGIN := 1
k := 100
n := 100
p := 0.6
B(k, n, p) :=
    x ← 0
    for j ∈ 1 .. k
        for i ∈ 1 .. n
            r ← rnd(1)
            x ← x + 1 if r < p
        X[j] ← x
        x ← 0
    X
rnd(1) = 0.00126842
X := B(100, 100, 0.6) = [
    60; 62; 65; 56; 51; 62; 59; 66; 62; 52
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]
X1 := rbinom(100, 100, 0.6) = [
    61; 58; 64; 71; 60; 61; 61; 64; 61; 55
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]
sqrt(var(X)) = 4.44954
max(X) = 71
X = [
    60; 62; 65; 56; 51; 62; 59; 66; 62; 52
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]
z := B(50, 100, 0.6) = [
    64; 63; 66; 61; 57; 60; 57; 62; 61; 66
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]
f(zz) := dbinom(zz, k, p)
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# плотность вероятности
F2(zz) := pbinom(zz, k, p)
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# функция распределения
m := mean(X)
m = 59.04  # матож
med := median(X)
med = 59
D := var(X)
D = 19.7984  # дисперс
σ := stdev(X)
σ = 4.44954
xmin := min(X)
xmin = 50
xmax := max(X)
xmax = 71
R := xmax - xmin
R = 21
N := 1 + 3.322*log(n)
N = 7.644
nn := 7
hh := histogram(nn, X)
hh1 := histogram(nn, X1)
mteor := k*p
mteor = 60
q := 1 - p
Dteor := k*p*q
ПРИМЕРНОЕ
Dteor = 24
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X := sort(X)
X1 := sort(X1)
min(X1) = 50
min(X) = 50
F1(x, X) :=
    nm ← 0
    for i ∈ 1 .. length(X)
        nm ← nm + 1/length(X) if X[i] < x
    nm
# Функция распределения смоделированной выборки | Функция распределения стандартной выборки
F(x) := F1(x, X)
F2(zz) := pbinom(zz, k, p)
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# функция распределения
ch(X) :=
    x ← min(X)
    j ← 1
    n[1] ← 1
    for i ∈ 2 .. length(X)
        n[j] ← n[j] + 1 if X[i] == x
        otherwise
            XX[j] ← x
            j ← j + 1
            n[j] ← 1
            x ← X[i]
    XX[j] ← x
    [XX; n/length(X)]
Ch := ch(X) = [
    [50; 51; 52; 53; 54; 55; 56; 57; 58; 59; 60; 61; 62; 63; 64; 65; 66; 68; 69; 71]; [0.02; 0.03; 0.04; 0.06; 0.03; 0.02; 0.07; 0.06; 0.09; 0.15; 0.07; 0.07; 0.08; 0.06; 0.03; 0.05; 0.03; 0.02; 0.01; 0.01]
]
Ch1 := ch(X1) = [
    [50; 51; 53; 54; 55; 56; 57; 58; 59; 60; 61; 62; 63; 64; 65; 66; 67; 68; 69; 71]; [0.02; 0.01; 0.02; 0.01; 0.05; 0.06; 0.08; 0.1; 0.08; 0.07; 0.1; 0.08; 0.07; 0.07; 0.03; 0.04; 0.05; 0.01; 0.02; 0.03]
]
# Полигон частот для смоделированной выборки | Полигон частот для стандартной выбоки
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