d/dx(1 - e^(-(λ*x^k))) → λ*k*x^(k - 1)*e^(-λ*x^k)
ORIGIN := 1
λ := 1
k := 5
n := 50
x := sort(rweibull(n, k))
f(zz) := dweibull(zz, k)
F(zz) := pweibull(zz, k)
x = [
    0.23203; 0.48416; 0.530588; 0.615531; 0.64043; 0.644887; 0.645563; 0.668702; 0.674895; 0.677009
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]
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L(s) := product(λ*s*x[i]^(s - 1)*e^(-λ*x[i]^s), i = 1 .. n)
L1(s) := ln(L(s))
i := 0 .. 100000
t := 3
p[i] := i/100  # error: Индекс массива является недопустимым для этого массива.
L(10) = 1.16038e-13
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Maximize(L, t) = 4.90432
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D := var(x)
D = 0.0488054
m := mean(x)
m = 0.899449
med := median(x)
med = 0.922782
Ω := stdev(x)
Ω = 0.22092
xmin := min(x)
xmax := max(x)
xmin = 0.23203
xmax = 1.28001
E := Ω/sqrt(n)
E = 0.0312427
R := xmax - xmin
Maximize(L1, t) = 4.90432
R = 1.04798
β := 0.95
t1 := qnorm((1 + β)/2, 0, 1)
t1 = 1.95996
ε := sqrt(D/n*t1) = 0.0437394
Mxl := m - ε = 0.85571
Mxr := m + ε = 0.943189
ε1 := sqrt(2/(n - 1)*D*t1) = 0.0624849
Dxl := D - ε1 = -0.0136795
Dxr := D + ε1 = 0.11129
t11 := qt((1 + β)/2, n)
t11 = 2.00856
εε := sqrt(D/n*t11) = 0.0442783
Mxl1 := m - εε = 0.855171
Mxr1 := m + εε = 0.943728
t11 := qchisq((1 - β)/2, n - 1) = 31.5549
t22 := qchisq((1 + β)/2, n - 1) = 70.2224
Dxl1 := D*(n - 1)/t22 = 0.0340556
Dxr1 := D*(n - 1)/t11 = 0.0757874
β1 := (1 - β)/2
β2 := (1 + β)/2
k1 := 5 .. 100
tright(k1) := D*(k1 - 1)/qchisq(β2, k1 - 1)
tleft(k1) := D*(k1 - 1)/qchisq(β1, k1 - 1)
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