ORIGIN := 1
nx := 50
ny := 100
m1 := 12
d1 := 7
s1 := sqrt(d1) = 2.64575
m2 := m1 + 1.5 = 13.5
d2 := d1 + 3 = 10
s2 := sqrt(d2) = 3.16228
X1 := sort(rnorm(nx, m1, s1))
X2 := sort(rnorm(ny, m2, s2))
α := 0.1
mx1 := mean(X1) = 12.6818
mx2 := mean(X2) = 12.7237
X1 = [
    4.78794; 5.93037; 7.83065; 9.42998; 9.52857; 9.68505; 9.87731; 9.98003; 10.1512; 10.7466
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]
X2 = [
    4.94056; 5.28605; 7.38514; 7.8137; 8.06985; 8.34291; 8.55943; 8.64385; 8.87405; 9.1594
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]
dx1 := var(X1) = 6.88763
dx2 := var(X2) = 8.69821
# 1)Проверки гипотезы о матожидании при известной дисперсии:
# H0: m1 = a0 =12; H1: m1 <> 12; дисперсия известна: d1 = 7
a0 := 12
zleft := qnorm(α/2, 0, 1) = -1.64485
z := (a0 - mx1)/sqrt(d1/nx) = -1.82206
zright := qnorm(1 - α/2, 0, 1) = 1.64485
# z > zright  => гипотеза H0 не принимается
# 2) Проверка гипотезы о  числовом значении матожидания при неизвестной дисперсии
# H0: m2 = a0 = 13.5; H1: m2 < 13.5, дисперсия неизвестна
a0 := 13.5
zleft := qt(α, ny - 1) = -1.29016
z := (mx2 - a0)/sqrt(dx2/ny) = -2.63201
# z < zleft => гипотеза H0 принимается
# 3) Гипотеза о числовом значении дисперсии
# H0: d1 = d0 = 7; H1: d1 > 16
d0 := 7
z := dx1*(nx - 1)/d0 = 48.2134
zright := qchisq(1 - α, nx - 1) = 62.0375
# z < zright  => гипотеза H0 принимается
# 4)Гипотеза о равентсве матожиданий нормальных выборок с известными равными дисперсиями
# H0: m1 = m2: H1: m1 <> m2, d1, d2 - известны
z := (mx1 - mx2)/sqrt(d1/nx + d2/ny) = -0.0857225
zleft := qnorm(α/2, 0, 1) = -1.64485
zright := qnorm(1 - α/2, 0, 1) = 1.64485
# zleft < z < zright  => гипотеза Ho принимается
# 5)Гипотеза о равенстве матожиданий  нормальных выборок с неизвестными равными дисперсиями
# H0: m1=m2: H1: m1 < m2, d1=d2, значение дисперсий неизвестны
t := (mx1 - mx2)/sqrt((2/nx)*((dx1*nx + dx2*nx)/(2*ny - 2))) = -0.105841
tleft := qt(α, 2*nx - 2) = -1.29025
# tleft < t  => гипотеза H0 принимается
# 6)Гипотеза о равенстве дисперсий двух нормальных выборок:
# Ho: d1 = d2; H1: d1 <> d2
z := dx1/dx2 = 0.791845
zleft := qF(α/2, nx - 1, ny - 1) = 0.653168
zright := qF(1 - α/2, nx - 1, ny - 1) = 1.48167
# zleft < z < zright  => гипотеза H0 принимается
