ORIGIN := 1
nx := 50
ny := 100
m1 := 12
d1 := 16
s1 := sqrt(d1) = 4
X3 := sort(rnorm(nx, m1, s1))
m2 := 13.5
d2 := 19
s2 := sqrt(d2) = 4.3589
X1 := sort(rnorm(nx, m1, s1))
X2 := sort(rnorm(ny, m2, s2))
X1 = [
    0.396512; 3.3716; 5.25726; 7.20915; 7.82275; 8.19413; 8.9421; 8.97768; 9.10767; 9.17792
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]
X2 = [
    1.11901; 4.64615; 5.14581; 5.55964; 6.11685; 6.46114; 7.27173; 7.34874; 7.4931; 7.72313
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]
X3 = [
    1.17307; 1.61009; 4.26525; 4.80733; 5.85741; 6.54733; 6.6919; 7.21395; 7.42464; 7.63897
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]
α := 0.1
mx1 := mean(X1) = 11.8373
mx2 := mean(X2) = 12.8778
dx1 := var(X1) = 12.8139
dx2 := var(X2) = 19.5608
# 1. Ho: m1 = a0 = 12; H1: m1 <> 3, дисперсия известна, d1=16
a0 := 12
zleft := qnorm(α/2, 0, 1) = -1.64485
zright := qnorm(1 - α/2, 0, 1) = 1.64485
z := (a0 - mx1)/sqrt(d1/nx) = 0.28762
# zleft < z < zright  => гипотеза Ho принимается
# 2. Ho: m2 = a0 = 13.5; H1: m2 <> 13.5, дисперсия неизвестна
a0 := 13.5
zleft := qt(α/2, ny - 1) = -1.66039
zright := qt(1 - α/2, ny - 1) = 1.66039
z := (mx2 - a0)/sqrt(dx2/ny) = -1.4069
# zleft < z < zright  => гипотеза Ho принимается
# 3. Ho: d1= d0 = 16; H1: d1 > 16,
d0 := 16
z := dx1*(nx - 1)/d0 = 39.2425
zright := qchisq(1 - α, nx - 1) = 62.0375
# z < zright  => гипотеза Ho принимается
# 4. Ho: m1 = m2: H1: m1 <> m2, d1, d2 - известны
z := (mx1 - mx2)/sqrt(d1/nx + d2/ny) = -1.45694
zleft := qnorm(α/2, 0, 1) = -1.64485
zright := qnorm(1 - α/2, 0, 1) = 1.64485
# zleft < z < zright  => гипотеза Ho принимается
# 5. Ho: m1=m2: H1: m1 < m2, d1=d2, значение дисперсий неизвестны
t := (mx1 - mx2)/sqrt((2/nx)*((dx1*nx + dx2*nx)/(2*ny - 2))) = -1.81946
tleft := qt(α, 2*nx - 2) = -1.29025
# tleft < t  => гипотеза Ho  не принимается
# 6. Ho: d1 = d2; H1: d1 <> d2
z := dx1/dx2 = 0.655079
# Написать в выводе какие гипотезы принимаются и нет, объяснить почему не принимаются гипотезы
zleft := qF(α/2, nx - 1, ny - 1) = 0.653168
zright := qF(1 - α/2, nx - 1, ny - 1) = 1.48167
# zleft < z < zright  => гипотеза Ho принимается
