ORIGIN := 1
d1 := 16
m := 100
α := 0.1
n_interval := 9  # Рекомендуемое разбиение выбокрки при обьеме 40 - 100 от 7 до 9ти интервалов
X := sort(rt(m, d1))
xmin := min(X) = -2.23937
xmax := max(X) = 2.25189
Range := xmax - xmin = 4.49125
Δ := Range/n_interval
Interval(X, Δ) :=
    beg ← min(X)
    end ← beg + Δ
    j ← 1
    n ← 1
    for i ∈ 1 .. length(X)
        n ← n + 1 if X[i] < end
        otherwise
            interval[j, 1] ← beg
            interval[j, 2] ← end
            interval[j, 3] ← n
            beg ← end
            end ← beg + Δ
            j ← j + 1
            n ← 1
    interval
RebuildMatrix(Matrix, numStr) :=
    n ← rows(Matrix)
    if numStr < n - 1
        Matrix[numStr, 2] ← Matrix[numStr + 1, 2]
        Matrix[numStr, 3] ← Matrix[numStr + 1, 3] + Matrix[numStr, 3]
        X ← stack(submatrix(Matrix, 1, numStr, 1, cols(Matrix)), submatrix(Matrix, numStr + 2, n, 1, cols(Matrix)))
    otherwise
        if numStr == n - 1
            Matrix[numStr + 1, 1] ← Matrix[numStr, 1]
            Matrix[numStr + 1, 3] ← Matrix[numStr + 1, 3] + Matrix[numStr, 3]
            X ← stack(submatrix(Matrix, 1, numStr - 1, 1, cols(Matrix)), submatrix(Matrix, numStr + 1, n, 1, cols(Matrix)))
        otherwise
            Matrix[numStr - 1, 2] ← Matrix[numStr, 2]
            Matrix[numStr - 1, 3] ← Matrix[numStr - 1, 3] + Matrix[numStr, 3]
            X ← submatrix(Matrix, 1, n - 1, 1, cols(Matrix))
    X
ModiferInterval(IntervalMatrix) :=
    n ← rows(IntervalMatrix)
    X ← IntervalMatrix
    i ← 1
    while i < rows(X) + 1
        if X[i, 3] < 5
            X ← RebuildMatrix(X, i)
            i ← 0
        i ← i + 1
    X
Interval(X, Δ) = [
    -2.23937, -1.74034, 7;
    -1.74034, -1.24131, 10;
    -1.24131, -0.742282, 14;
    -0.742282, -0.243254, 15;
    -0.243254, 0.255774, 20;
    0.255774, 0.754803, 17;
    0.754803, 1.25383, 11;
    1.25383, 1.75286, 6
]
SpMatr := ModiferInterval(Interval(X, Δ)) = [
    -2.23937, -1.74034, 7;
    -1.74034, -1.24131, 10;
    -1.24131, -0.742282, 14;
    -0.742282, -0.243254, 15;
    -0.243254, 0.255774, 20;
    0.255774, 0.754803, 17;
    0.754803, 1.25383, 11;
    1.25383, 1.75286, 6
]
sum(SpMatr[i, 3], i = 1 .. rows(SpMatr)) = 100
i := 1 .. rows(SpMatr)
n[i] := SpMatr[i, 3]
P[i] := pt(SpMatr[i, 2], d1) - pt(SpMatr[i, 1], d1)
P = [0.0306525; 0.0656943; 0.118146; 0.171113; 0.193858; 0.170025; 0.11671; 0.0645761]
sum(P[i], i = 1 .. length(P)) = 0.930775
χ2 := m*sum((SpMatr[i, 3]/m - P[i])^2/P[i], i = 1 .. length(P)) = 7.59756
qchisq(1 - α, length(P) - 1) = 12.017
# По Колмогорову
FX(x) :=
    sum((-1)^k*e^(-2*k^2*x^2), k = -1000000 .. 1000000) if x > 0
    0 otherwise
sup(F, X) :=
    a ← F(X[1])
    for i ∈ 2 .. length(X)
        a ← F(X[i]) if F(X[i]) > a
    a
F(x, X) :=
    sum ← 0
    i ← 1
    while x > X[i]
        sum ← sum + 1/length(X)
        break if i == length(X)
        i ← i + 1 otherwise
    sum
f(x) := F(x, X)
i := 1 .. m
FFF(x) := |f(x) - pt(x, d1)|
Dm := sqrt(m)*sup(FFF, X) = 0.66645
root(1 - α - FX(x), x, 0, 5) = 1.22385
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