ORIGIN := 1
d1 := 16
d2 := 21
m := 100
α := 0.1
n_interval := 9  # Рекомендуемое разбиение выбокрки при обьеме 40 - 100 от 7 до 9ти интервалов
X := sort(rF(m, d1, d2))
xmin := min(X) = 0.232104
xmax := max(X) = 3.7265
Range := xmax - xmin = 3.4944
Δ := Range/n_interval
Interval(X, Δ) :=
    beg ← min(X)
    end ← beg + Δ
    j ← 1
    n ← 1
    for i ∈ 1 .. length(X)
        n ← n + 1 if X[i] < end
        otherwise
            interval[j, 1] ← beg
            interval[j, 2] ← end
            interval[j, 3] ← n
            beg ← end
            end ← beg + Δ
            j ← j + 1
            n ← 1
    interval
RebuildMatrix(Matrix, numStr) :=
    n ← rows(Matrix)
    if numStr < n - 1
        Matrix[numStr, 2] ← Matrix[numStr + 1, 2]
        Matrix[numStr, 3] ← Matrix[numStr + 1, 3] + Matrix[numStr, 3]
        X ← stack(submatrix(Matrix, 1, numStr, 1, cols(Matrix)), submatrix(Matrix, numStr + 2, n, 1, cols(Matrix)))
    otherwise
        if numStr == n - 1
            Matrix[numStr + 1, 1] ← Matrix[numStr, 1]
            Matrix[numStr + 1, 3] ← Matrix[numStr + 1, 3] + Matrix[numStr, 3]
            X ← stack(submatrix(Matrix, 1, numStr - 1, 1, cols(Matrix)), submatrix(Matrix, numStr + 1, n, 1, cols(Matrix)))
        otherwise
            Matrix[numStr - 1, 2] ← Matrix[numStr, 2]
            Matrix[numStr - 1, 3] ← Matrix[numStr - 1, 3] + Matrix[numStr, 3]
            X ← submatrix(Matrix, 1, n - 1, 1, cols(Matrix))
    X
ModiferInterval(IntervalMatrix) :=
    n ← rows(IntervalMatrix)
    X ← IntervalMatrix
    i ← 1
    while i < rows(X) + 1
        if X[i, 3] < 5
            X ← RebuildMatrix(X, i)
            i ← 0
        i ← i + 1
    X
Interval(X, Δ) = [
    0.232104, 0.62037, 16;
    0.62037, 1.00864, 35;
    1.00864, 1.3969, 27;
    1.3969, 1.78517, 9;
    1.78517, 2.17344, 6;
    2.17344, 2.5617, 5;
    2.5617, 2.94997, 2
]
SpMatr := ModiferInterval(Interval(X, Δ)) = [
    0.232104, 0.62037, 16;
    0.62037, 1.00864, 35;
    1.00864, 1.3969, 27;
    1.3969, 1.78517, 9;
    1.78517, 2.17344, 6;
    2.17344, 2.94997, 7
]
sum(SpMatr[i, 3], i = 1 .. rows(SpMatr)) = 100
i := 1 .. rows(SpMatr)
n[i] := SpMatr[i, 3]
P[i] := pF(SpMatr[i, 2], d1, d2) - pF(SpMatr[i, 1], d1, d2)
P = [0.164483; 0.349011; 0.250865; 0.127223; 0.0578987; 0.0374836]
sum(P[i], i = 1 .. length(P)) = 0.986965
χ2 := m*sum((SpMatr[i, 3]/m - P[i])^2/P[i], i = 1 .. length(P)) = 4.07592
q := qchisq(1 - α, length(P) - 1) = 9.23636
# Гипотеза Ho принимается по критерию Пирсона, если статистика χ2<q
# По Колмогорову
FX(x) :=
    sum((-1)^k*e^(-2*k^2*x^2), k = -1000000 .. 1000000) if x > 0
    0 otherwise
sup(F, X) :=
    a ← F(X[1])
    for i ∈ 2 .. length(X)
        a ← F(X[i]) if F(X[i]) > a
    a
F(x, X) :=
    sum ← 0
    i ← 1
    while x > X[i]
        sum ← sum + 1/length(X)
        break if i == length(X)
        i ← i + 1 otherwise
    sum
f(x) := F(x, X)
i := 1 .. m
FFF(x) := |f(x) - pF(x, d1, d2)|
Dm := sqrt(m)*sup(FFF, X) = 0.629982
# Критерий правосторонний, следовательно, если Dm<root, то гипотеза Ho принимается по критерию Колмогорова
root(1 - α - FX(x), x, 0, 5) = 1.22385
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