ORIGIN := 1
μ := 2
λ := 5
x1 := rbeta(500, μ, λ)
i := 0.1, 0.2 .. 1
q[i*10] := qbeta(i, μ, λ)
x1 := sort(x1)
f(x) := dbeta(x, μ, λ)
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m := mean(x1)
F(x) := pbeta(x, μ, λ)
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m = 0.285747
med := median(x1)
med = 0.259745
D := var(x1)
D = 0.0253509
σ := stdev(x1)
σ = 0.15922
xmin := min(x1)
xmax := max(x1)
x1 = [
    0.00214997; 0.0123066; 0.0146433; 0.0157252; 0.0177178; 0.0272509; 0.0309374; 0.0314317; 0.0340112; 0.0369955
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]
xmin = 0.00214997
xmax = 0.797457
R := xmax - xmin
R = 0.795307
m := 20
L := R/m
i := 1 .. 20
int[i] := xmin + L/2*(2*i - 1)
nn := 10
hh := histogram(nn, x1)
h := hh[:, 2]
int := hh[:, 1]
hc := R/10
S := sum((hc*hh[:, 2])[i], i = 1 .. 10)
S = 39.7654
S2 := sum(hh[:, 2][i]/S*hc, i = 1 .. 10)
S2 = 1
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