ORIGIN := 1
n := 100
k := 7
x := rchisq(n, k)
x1 := sort(x)
f(z) := dchisq(z, k)
F(z) := pchisq(z, k)
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x = [
    4.76219; 11.0173; 1.59176; 3.29641; 17.0028; 2.6929; 3.59471; 6.16355; 8.95624; 10.5114
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]
x1 = [
    1.51037; 1.5775; 1.59155; 1.59176; 1.70007; 1.76669; 1.92542; 1.99484; 2.15166; 2.22387
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]
