ORIGIN := 1
n := 10
k := 21
Ksi[1] := 2.5
Ksi[2] := -7
Ksi[3] := 6
Ksi[4] := 1
Ksi[5] := -3.25
Ksi[6] := 6.4
Ksi[7] := -2
Ksi[8] := -5.5
Ksi[9] := -1.1
Ksi[10] := 3.7
P := [
    0.10, 0.12, 0.07, 0.05, 0.19, 0.11, 0.06, 0.18, 0.04, 0.08;
    0.00, 0.05, 0.15, 0.25, 0.31, 0.04, 0.03, 0.06, 0.09, 0.02;
    0, 0, 0.2, 0.21, 0.01, 0.02, 0.03, 0.04, 0.25, 0.24;
    0, 0, 0, 0.15, 0.16, 0.17, 0.18, 0.19, 0.07, 0.08;
    0, 0, 0, 0, 0.07, 0.12, 0.31, 0.21, 0.25, 0.04;
    0, 0, 0, 0, 0, 0.35, 0.15, 0.40, 0.05, 0.05;
    0, 0, 0, 0, 0, 0, 0.41, 0.27, 0.16, 0.16;
    0, 0, 0, 0, 0, 0, 0, 0.54, 0.21, 0.25;
    0, 0, 0, 0, 0, 0, 0, 0, 0.65, 0.35;
    0, 0, 0, 0, 0, 0, 0, 0, 0, 1
]
P[1, 1] = 0.1
P[8, 6] = 0
P[9, 10] = 0.35
pp[1, 1] := 0.3
pp[2, 1] := 0.21
pp[3, 1] := 0.15
pp[4, 1] := 0.10
pp[5, 1] := 0.07
pp[6, 1] := 0.05
pp[7, 1] := 0.04
pp[8, 1] := 0.02
pp[9, 1] := 0.02
pp[10, 1] := 0.04
transpose(Ksi) = [2.5, -7, 6, 1, -3.25, 6.4, -2, -5.5, -1.1, 3.7]
i := 1 .. n
j := 2 .. k + 1
pp[i, j] := sum(pp[m, j - 1]*P[m, i], m = 1 .. n)
pp = [
    0.3, 0.03, 0.003, 0.0003, 3e-5, 3e-6, 3e-7, 3e-8, 3e-9, 3e-10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;
    0.21, 0.0465, 0.005925, 0.00065625, 6.88125e-5, 7.04063e-6, 7.12031e-7, 7.16016e-8, 7.18008e-9, 7.19004e-10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;
    0.15, 0.0825, 0.025575, 0.00621375, 0.00136219, 0.000284859, 5.8238e-5, 1.17754e-5, 2.36792e-6, 4.74871e-7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;
    0.1, 0.114, 0.04755, 0.0141345, 0.00360412, 0.000845381, 0.000188538, 4.07037e-5, 8.59778e-6, 1.78888e-6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;
    0.07, 0.1445, 0.049295, 0.0137211, 0.00354458, 0.000865434, 0.000201443, 4.51271e-5, 9.81713e-6, 2.08932e-6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;
    0.05, 0.0873, 0.074085, 0.0410071, 0.0185854, 0.00757625, 0.00290556, 0.0010744, 0.000388616, 0.000138703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;
    0.04, 0.0924, 0.121964, 0.0860834, 0.0484671, 0.0244516, 0.011591, 0.00528631, 0.00235022, 0.00102655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;
    0.02, 0.1479, 0.203229, 0.193613, 0.150105, 0.10307, 0.0656451, 0.0398207, 0.0233779, 0.0134179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;
    0.02, 0.119, 0.197673, 0.217083, 0.203631, 0.174052, 0.139417, 0.106485, 0.0784941, 0.0563297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;
    0.04, 0.1359, 0.271704, 0.427188, 0.570602, 0.688844, 0.779992, 0.847236, 0.895368, 0.929083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]
uporjad(x) :=
    n ← rows(x)
    for i ∈ 1 .. n - 1
        for j ∈ i + 1 .. n
            a ← x[i]
            if x[j] < x[i]
                x[i] ← x[j]
                x[j] ← a
    x
x := uporjad(pp[:, 2])
rjadraspred(p, x) :=
    n ← rows(p)
    for i ∈ 1 .. n
        γ ← rnd(1)
        a ← 0
        for j ∈ 1 .. n
            a ← a + p[j]
            if γ < a
                y[i] ← x[j]
                break
    y
y := rjadraspred(x, Ksi)
x = [0.03; 0.0465; 0.0825; 0.0873; 0.0924; 0.114; 0.119; 0.1359; 0.1445; 0.1479]
y = [2.5; 1; -5.5; 6.4; -1.1; 1; -1.1; -3.25; 6; 6]
tcschepmarkova(k, pp, Ksi) :=
    for i ∈ 1 .. k
        x ← pp[:, i + 1]
        y ← uporjad(x)
        z ← rjadraspred(y, Ksi)
        xx[:, i] ← z
    xx
zz := tcschepmarkova(k, pp, Ksi)
zz = [
    -5.5, -1.1, -5.5, -2, 3.7, 3.7, 3.7, 3.7, 3.7, 3.7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;
    -5.5, 6, 3.7, -5.5, 3.7, 3.7, 3.7, 3.7, 3.7, 3.7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;
    1, -1.1, 3.7, -5.5, -1.1, 3.7, 3.7, 3.7, 3.7, 3.7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;
    2.5, -3.25, -2, 3.7, 3.7, 3.7, 3.7, 3.7, 3.7, 3.7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;
    6, 3.7, -5.5, -5.5, 3.7, 3.7, 3.7, 3.7, -1.1, 3.7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;
    3.7, -2, 3.7, 3.7, -5.5, -1.1, 3.7, -1.1, 3.7, 3.7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;
    -1.1, 3.7, -5.5, 3.7, 3.7, 3.7, 3.7, -1.1, 3.7, 3.7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;
    -5.5, -2, 6, 3.7, -1.1, 3.7, 3.7, 3.7, 3.7, 3.7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;
    -2, -5.5, -2, -5.5, 3.7, -5.5, 3.7, 3.7, 3.7, 3.7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;
    6, -2, -5.5, 3.7, 3.7, 3.7, 3.7, -1.1, -1.1, 3.7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]
Ksi = [2.5; -7; 6; 1; -3.25; 6.4; -2; -5.5; -1.1; 3.7]
i := 1 .. k
t[i] := i
z := transpose(zz)
z = [
    -5.5, -5.5, 1, 2.5, 6, 3.7, -1.1, -5.5, -2, 6;
    -1.1, 6, -1.1, -3.25, 3.7, -2, 3.7, -2, -5.5, -2;
    -5.5, 3.7, 3.7, -2, -5.5, 3.7, -5.5, 6, -2, -5.5;
    -2, -5.5, -5.5, 3.7, -5.5, 3.7, 3.7, 3.7, -5.5, 3.7;
    3.7, 3.7, -1.1, 3.7, 3.7, -5.5, 3.7, -1.1, 3.7, 3.7;
    3.7, 3.7, 3.7, 3.7, 3.7, -1.1, 3.7, 3.7, -5.5, 3.7;
    3.7, 3.7, 3.7, 3.7, 3.7, 3.7, 3.7, 3.7, 3.7, 3.7;
    3.7, 3.7, 3.7, 3.7, 3.7, -1.1, -1.1, 3.7, 3.7, -1.1;
    3.7, 3.7, 3.7, 3.7, -1.1, 3.7, 3.7, 3.7, 3.7, -1.1;
    3.7, 3.7, 3.7, 3.7, 3.7, 3.7, 3.7, 3.7, 3.7, 3.7;
    3.7, 3.7, -1.1, 3.7, -1.1, 3.7, 3.7, 3.7, 3.7, 3.7;
    3.7, 3.7, 3.7, 3.7, -1.1, 3.7, 3.7, 3.7, 3.7, 3.7;
    3.7, 3.7, 3.7, 3.7, 3.7, 3.7, 3.7, 3.7, 3.7, 3.7;
    3.7, 3.7, 3.7, 3.7, 3.7, 3.7, 3.7, 3.7, 3.7, 3.7;
    3.7, 3.7, 3.7, 3.7, 3.7, 3.7, 3.7, 3.7, 3.7, 3.7;
    3.7, 3.7, 3.7, 3.7, 3.7, 3.7, 3.7, 3.7, 3.7, 3.7;
    3.7, 3.7, 3.7, 3.7, 3.7, 3.7, 3.7, -1.1, 3.7, 3.7;
    3.7, 3.7, 3.7, 3.7, 3.7, 3.7, 3.7, 3.7, 3.7, 3.7;
    3.7, 3.7, 3.7, 3.7, 3.7, 3.7, 3.7, 3.7, 3.7, 3.7;
    3.7, 3.7, 3.7, 3.7, 3.7, 3.7, 3.7, 3.7, 3.7, 3.7;
    3.7, 3.7, 3.7, 3.7, 3.7, 3.7, 3.7, 3.7, 3.7, 3.7
]
table(z, eps) :=
    k ← rows(z)
    n ← cols(z)
    for i ∈ 1 .. k
        m ← 0
        for j ∈ 2 .. n
            m ← m + 1
            a ← z[i, j - 1]
            if |a - z[i, j]| < 10^-3
                (γ ← rnd(1))
                a ← -a if γ < 0.5
                z[i, j - 1] ← z[i, j - 1] + a*m*eps
            if j == n
                m ← m + 1
                z[i, j] ← z[i, j] - a*m*eps
    z
z := table(z, 0.01)
z = [
    -5.445, -5.5, 1, 2.5, 6, 3.7, -1.1, -5.5, -2, 6.2;
    -1.1, 6, -1.1, -3.25, 3.7, -2, 3.7, -2, -5.5, -1.45;
    -5.5, 3.774, 3.7, -2, -5.5, 3.7, -5.5, 6, -2, -5.3;
    -2, -5.61, -5.5, 3.7, -5.5, 3.478, 3.441, 3.7, -5.5, 4.25;
    3.737, 3.7, -1.1, 3.552, 3.7, -5.5, 3.7, -1.1, 4.033, 3.33;
    3.663, 3.774, 3.589, 3.552, 3.7, -1.1, 3.959, 3.7, -5.5, 4.25;
    3.737, 3.774, 3.811, 3.848, 3.515, 3.922, 3.441, 3.996, 3.367, 4.07;
    3.737, 3.626, 3.589, 3.552, 3.7, -1.166, -1.1, 3.996, 3.7, -1.47;
    3.737, 3.774, 3.811, 3.7, -1.1, 3.478, 3.441, 3.996, 3.7, -1.47;
    3.737, 3.626, 3.589, 3.552, 3.885, 3.478, 3.441, 3.404, 4.033, 3.33;
    3.737, 3.7, -1.1, 3.7, -1.1, 3.922, 3.959, 3.404, 4.033, 3.33;
    3.663, 3.774, 3.811, 3.7, -1.1, 3.922, 3.959, 3.996, 4.033, 3.33;
    3.737, 3.626, 3.589, 3.552, 3.885, 3.478, 3.959, 3.404, 4.033, 3.33;
    3.737, 3.626, 3.811, 3.552, 3.515, 3.478, 3.959, 3.996, 4.033, 3.33;
    3.663, 3.626, 3.811, 3.848, 3.515, 3.478, 3.441, 3.996, 4.033, 3.33;
    3.737, 3.774, 3.811, 3.552, 3.515, 3.922, 3.959, 3.996, 4.033, 3.33;
    3.663, 3.626, 3.811, 3.552, 3.515, 3.478, 3.7, -1.1, 3.367, 4.07;
    3.737, 3.774, 3.589, 3.848, 3.885, 3.922, 3.959, 3.996, 3.367, 4.07;
    3.663, 3.626, 3.589, 3.552, 3.515, 3.478, 3.959, 3.404, 4.033, 3.33;
    3.663, 3.774, 3.589, 3.848, 3.885, 3.922, 3.959, 3.404, 3.367, 4.07;
    3.737, 3.774, 3.811, 3.848, 3.885, 3.922, 3.441, 3.996, 3.367, 4.07
]
Ksi1 := z[:, 1]
Ksi2 := z[:, 2]
Ksi3 := z[:, 3]
Ksi4 := z[:, 4]
Ksi5 := z[:, 5]
Ksi6 := z[:, 6]
Ksi7 := z[:, 7]
Ksi8 := z[:, 8]
Ksi9 := z[:, 9]
Ksi10 := z[:, 10]
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