ORIGIN := 1
λ := 0.8
λ = 0.8
x1 := rexp(50, λ)
x2 := sort(x1)
x2 = [
    0.00401188; 0.0144476; 0.0563777; 0.165532; 0.185307; 0.217764; 0.221507; 0.243745; 0.305269; 0.311124
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]
f(x) := dexp(x, λ)
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F(x) := pexp(x, λ)
x1 = [
    8.33748; 2.05424; 0.670166; 1.31118; 0.243745; 2.18495; 0.427241; 1.48847; 2.99048; 2.39399
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]
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λ = 0.8
i := 0.1, 0.2 .. 0.9
q[i*10] := qexp(i, λ)
i = [0.1; 0.2; 0.3; 0.4; 0.5; 0.6; 0.7; 0.8; 0.9]
m := mean(x1)
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m = 1.35228
med := median(x1)
med = 0.803692
D := var(x1)
D = 2.60075
σ := stdev(x1)
σ = 1.61268
xmin := min(x1)
xmax := max(x1)
xmin = 0.00401188
xmax = 8.33748
E := 0.477*sqrt(2)*σ
E = 1.08788
R := xmax - xmin
R = 8.33347
m := 20
L := R/m
i := 1 .. 20
int[i] := xmin + L*(2*i - 1)/2
h := hist(int, x1)
h = [13; 14; 3; 3; 4; 3; 1; 0; 1; 0; 0; 0; 0; 2; 0; 0; 0; 0; 0]
i := 1 .. 19
n := 50
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h[i] := h[i]/n
