ORIGIN := 1
iy := -1023
t := runif(100, 0, 1)
# Функция Urand:
Urand(iy) :=
    m2 ← 1073741824
    halfm ← m2
    mic ← halfm*atan(1.0)
    ib ← mod(mic, 8)
    ib ← mic - ib + 5
    mic ← halfm*(1 - 1/sqrt(3))
    iθ ← mod(mic, 2)
    iθ ← mic - iθ + 1
    s ← 0.5/halfm
    iy ← iy*ib + iθ
    iy ← mod(iy, 2147483648)
    iy ← (iy + m2) + m2 if iy < 0
    iy ← (iy - m2) - m2 if iy/2 > m2
    while iy > 2147483648
        iy ← iy - 2147483648
    u ← iy*s
    u
MassUrand(iy, k) :=
    for i ∈ 1 .. k
        u[i] ← Urand(iy)
        iy ← u[i]*2147483648
    u
k := Urand(iy)
k = 0.480162
k1 := Urand(k)
k1 = 0.399884
d := MassUrand(iy, 100)
α := 1
λ := 5
i := 1 .. 100
x1[i] := (-1/λ*ln(d[i]))^(1/α)
x1 := sort(x1)
# Функция Randu:
Randu(ix, k) :=
    for i ∈ 1 .. k
        iy ← ix*65539
        iy ← iy + 2147483647 + 1 if iy < 0
        while iy > 2147483647
            iy ← iy - 2147483647
        rand[i] ← iy/2147483647
        ix ← iy
    rand
ix := 19510
u := Randu(ix, 1)
u = [0.595425]
u1 := Randu(ix, 100)
i := 1 .. 100
x2[i] := (-1/λ*ln(u1[i]))^(1/α)
x2 := sort(x2)
u2 := runif(100, 0, 1)
x3[i] := (-1/λ*ln(u2[i]))^(1/α)
x3 := sort(x3)
X := rweibull(100, α)
Xmax := max(X)
i := 1 .. 100
X[i] := X[i]/Xmax
X := sort(X)
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getInt(X, m) :=
    xmin ← min(X)
    xmax ← max(X)
    R ← xmax - xmin
    L ← R/m
    for j ∈ 1 .. m
        Int[j] ← xmin + L/2*(2*j - 1)
    Int
INT := getInt(X, 20)
int1 := getInt(x1, 20)
int2 := getInt(x2, 20)
int3 := getInt(x3, 20)
getH(int, X, m) :=
    h ← hist(int, X)
    for i ∈ 1 .. m - 1
        h[i] ← h[i]/50
H := getH(INT, X, 20)
h1 := getH(int1, x1, 20)
h2 := getH(int2, x2, 20)
h3 := getH(int3, x3, 20)
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