ORIGIN := 1
iy := -1023
t := runif(100, 0, 1)
Urand(iy) :=
    m2 ← 1073741824
    halfm ← m2
    mic ← halfm*atan(1.0)
    ib ← mod(mic, 8)
    ib ← mic - ib + 5
    mic ← halfm*(1 - 1/sqrt(3))
    iθ ← mod(mic, 2)
    iθ ← mic - iθ + 1
    s ← 0.5/halfm
    iy ← iy*ib + iθ
    iy ← mod(iy, 2147483648)
    iy ← (iy + m2) + m2 if iy < 0
    iy ← (iy - m2) - m2 if iy/2 > m2
    while iy > 2147483648
        iy ← iy - 2147483648
    u ← iy*s
    u
MassUrand(iy, k) :=
    for i ∈ 1 .. k
        u[i] ← Urand(iy)
        iy ← u[i]
    u
k := Urand(iy)
k = 0.480162
k1 := Urand(k)
k1 = 0.399884
d := MassUrand(iy, 100)
d = [
    0.480162; 0.399884; 0.368359; 0.355979; 0.351118; 0.349208; 0.348459; 0.348164; 0.348049; 0.348003
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]
chisq(n) :=
    for z ∈ 1 .. n
        for m ∈ 1 .. 10
            r ← runif(12, 0, 1)
            u[m] ← sum(r[k], k = 1 .. 12) - 6
        chi[z] ← sum(u[l]^2, l = 1 .. 10)
    chi
temp := chisq(100)
temp = [
    8.50168; 13.6746; 7.29547; 10.6067; 9.17592; 5.84156; 11.7701; 19.8483; 9.233; 5.4861
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]
x1 := chisq(50)
x1 := sort(x1)
m := mean(x1)
m = 9.07234
med := median(x1)
med = 8.12245
D := var(x1)
D = 18.3683
σ := stdev(x1)
σ = 4.28582
xmin := min(x1)
xmax := max(x1)
E := 0.477*sqrt(2)*σ
R := xmax - xmin
m := 20
L := R/m
i := 1 .. 20
int[i] := xmin + L/2*(2*i - 1)
h := hist(int, x1)
i := 1 .. 19
h[i] := h[i]/50
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