ORIGIN := 1
mx1 := 8
σx1 := sqrt(12)
Dx1 := 12
mx2 := 9.5
σx2 := sqrt(15)
Dx2 := 15
a := 0
b := 0.5
n := 50
n1 := 100
NORM := rnorm(n, mx1, σx1)
NORM1 := rnorm(n1, mx2, σx2)
UNIF := runif(n, a, b)
i := 1 .. 50
NORM[i] := NORM[i] + UNIF[i]
NORM = [
    8.96833; 6.81664; 6.72582; 13.1632; 4.75422; 6.93882; 3.97004; 6.67792; 0.992282; 12.2844
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]
NORM1 = [
    11.7274; 7.34883; 7.88759; 6.04642; 2.58212; 8.64476; 9.53079; 8.23753; 10.9948; 11.651
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]
UNIF = [
    0.167653; 0.312702; 0.144982; 0.449333; 0.164088; 0.230172; 0.206389; 0.060496; 0.0743446; 0.0557877
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]
# Проверки гипотезы о матожидании при известной дисперсии:
α := 0.05
xmean := mean(NORM)
xmean = 7.42764
xright := qnorm(1 - α/2, 0, 1)
xleft := -xright
zb := (xmean - mx1)/sqrt(Dx1/n)
xleft = -1.95996
xright = 1.95996
zb = -1.16833  # т.к. xleft < zb < xright - гипотеза принимается
# Проверка гипотезы о значении матожидания при неизвестной дисперсии:
Dx := n/(n - 1)*var(NORM)
Dx = 17.9601
xright := qt(1 - α, n - 1)
xright = 1.67655
zb := (xmean - mx1)/sqrt(Dx/n)
zb = -0.954996
# т.к. zb < xright - гипотеза принимается
# Гипотеза о числовом значении дисперсии:
xleft := qchisq(α, n - 1)
xleft = 33.9303
zb := (n - 1)*Dx/Dx1
zb = 73.3369
# т.к. xleft < zb - гипотеза принимается
# Гипотеза о равентсве матожиданий нормальных выборок с известными дисперсиями:
xleft := qnorm(α, 0, 1)
xleft = -1.64485
ymean := mean(NORM1)
ymean = 8.76967
zb := (xmean - ymean)/sqrt(Dx1/n + Dx2/n1)
zb = -2.14897
# т.к. zb < xleft - гипотеза отвергается
# Гипотеза о равенстве матожиданий выборок с неизвестными равными дисперсиями
Dy := n1/(n1 - 1)*var(NORM1)
Dy = 12.4599
xright := qt(1 - α, n + n1 - 2)
xright = 1.65521
zb := (xmean - ymean)/sqrt((1/n + 1/n1)*((n - 1)*Dx + (n1 - 1)*Dy)/(n + n1 - 2))
zb = -2.05033
# тк zb < xright - гипотеза принимается
# Гипотеза о равенстве дисперсий двух нормальных выборок:
xleft := qF(α/2, n - 1, n1 - 1)
xleft = 0.601032
xright := qF(1 - α/2, n - 1, n1 - 1)
xright = 1.59739
zb := Dx/Dy
zb = 1.44143
# тк xleft < zb < xright - гипотеза принимается
