ORIGIN := 1
x := [1; 2; 3; 4; 5; 6; 7; 8; 9; 10; 11]
y := [6.32; 6.52; 6.65; 7.26; 7.49; 7.83; 8.13; 8.40; 8.58; 9.01; 9.05]
n := rows(x)
n = 11
a := intercept(x, y)
a = 5.98618
b := slope(x, y)
b = 0.293818
M[:, 1] := x
M[:, 2] := y
M := csort(M, 1)
x := M[:, 1]
y := M[:, 2]
i := 1 .. n
yr[i] := a + b*x[i]
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xmean := mean(x)
xmean = 6
ymean := mean(y)
ymean = 7.74909
β1 := 0.90
α1 := 1 - β1
t := qt(1 - α1/2, n - 2)
α1 = 0.1
t = 1.83311
D1 := 1/(n - 2)*sum((y[k] - yr[k])^2, k = 1 .. n)
D1 = 0.0132319
aleft := a - t*sqrt(D1/(n - 2))
aright := a + t*sqrt(D1/(n - 2))
aleft = 5.91589
aright = 6.05647
εb := sqrt(n/(n - 2)*D1/sum((x[k] - xmean)^2, k = 1 .. n))
εb = 0.0121252
bleft := b - t*εb
bright := b + t*εb
bleft = 0.271591
bright = 0.316045
i := 1 .. n
ε[i] := y[i] - yr[i]
yleft[i] := yr[i] - t*sqrt(D1/(n - 2)*(1 + n*(x[i] - xmean)^2/sum((x[k] - xmean)^2, k = 1 .. n)))
yright[i] := yr[i] + t*sqrt(D1/(n - 2)*(1 + n*(x[i] - xmean)^2/sum((x[k] - xmean)^2, k = 1 .. n)))
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r := sum(x[i] - □, i = 1 .. n)  # error: Пустой местозаполнитель.
