ORIGIN := 1
lambda := 10
# Функция распределения и плотность вероятности:
f(x) := dpois(x, lambda)
F(x) := ppois(x, lambda)
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# Значения процентилей:
i := 0.1, 0.2 .. 0.9
q[i*10] := qpois(i, lambda)
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# Выборка и ее числовые характеристики:
x1 := rpois(100, lambda)
x1 := sort(x1)
m := mean(x1)
m = 10.2
med := median(x1)
med = 10
D := var(x1)
D = 10.3
sigma := stdev(x1)
sigma = 3.20936
x1 = [
    4; 5; 5; 5; 5; 5; 6; 6; 6; 6
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]
xmin := min(x1)
xmin = 4
xmax := max(x1)
xmax = 19
# Гистограмма выборки:
R := xmax - xmin
R = 15
m := 20
L := R/m
i := 1 .. 20
int[i] := xmin + L/2*(2*i - 1)
h := hist(int, x1)
i := 1 .. 19
h[i] := h[i]/50
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