X(t) := U*t + V*sin(t) + 2  # error: Эта переменная не определена.
X(t) → U*t + V*sin(t) + 2
f1(t) := t
MU := 0
DU := 1
DUV := 0
f2(t) := sin(t)
MV := 0
DV := 1
MX(t) := f1(t)*MU + f2(t)*MV + 2 → 2
X(t1)*X(t2) → (U*t1 + V*sin(t1) + 2)*(U*t2 + V*sin(t2) + 2)
MX(t1)*MX(t2) → 4
KX(t1, t2) := DU*f1(t1)*f1(t2) + DV*f2(t1)*f2(t2) + DUV*(f1(t1)*f2(t2) + f1(t2)*f2(t1)) → t1*t2 + sin(t1)*sin(t2)
DX(t) := KX(t, t) → t^2 + sin(t)^2
MY1(t) := d/dt(MX(t)) → 0
KY1(t1, t2) := d/dt1(d/dt2(KX(t1, t2))) → cos(t1)*cos(t2) + 1
DY1(t) := KY1(t, t) → cos(t)^2 + 1
MY2(t) := MX(t) + d/dt(MX(t)) → 2
KY2(t1, t2) := KX(t1, t2) + d/dt1(KX(t1, t2)) + d/dt2(KX(t1, t2)) + d/dt1(d/dt2(KX(t1, t2))) simplify → t1 + t2 + cos(t1 - t2) + sin(t1 + t2) + t1*t2 + 1
DY2(t) := KY2(t, t) → 2*t + sin(2*t) + t^2 + 2
F(t) := integral(MX(t), t) → 2*t
F(0) → 0
MY3(t) := F(t) - F(0) → 2*t
FK(t1, t2) := integral(KX(t1, t2), t2) → t1*t2^2/2 - sin(t1 + t2)/2 - sin(t1 - t2)/2
FK(t1, 0) → -sin(t1)
fk(t1, t2) := FK(t1, t2) - FK(t1, 0) → sin(t1) - sin(t1 + t2)/2 - sin(t1 - t2)/2 + t1*t2^2/2
F2K(t1, t2) := integral(fk(t1, t2), t1) → t1^2*t2^2/4 - cos(t1) + cos(t1)*cos(t2)
F2K(0, t2) → cos(t2) - 1
KY3(t1, t2) := F2K(t1, t2) - F2K(0, t2) → t1^2*t2^2/4 - cos(t2) - cos(t1) + cos(t1)*cos(t2) + 1
DY3(t) := KY3(t, t) simplify → t^4/4 + cos(t)^2 - 2*cos(t) + 1
RXY1(t1, t2) := d/dt2(KX(t1, t2)) → t1 + cos(t2)*sin(t1)
RY1X(t1, t2) := d/dt1(KX(t1, t2)) → t2 + cos(t1)*sin(t2)
