α := 10
β := 4
D := 3
a1 := 5
b1 := 4
a2 := 3
b2 := 2
Kx1(τ) := D*e^(-α*|τ|)*(cos(β*τ) + α/β*sin(β*|τ|))
Kx1(τ) → 3*e^(-10*|τ|)*(cos(4*τ) + 5*sin(4*|τ|)/2)
Sx1(w) := 1/(2*π)*integral(Kx1(τ)*e^(-1i*w*τ), τ = -∞ .. ∞) → 6960/(π*(w^4 + 168*w^2 + 13456))
Φ2_1(w) := (b2^2 + (a2*w)^2)/(b1^2 + (a1*w)^2) → (9*w^2 + 4)/(25*w^2 + 16)
Sy1(w) := Φ2_1(w)*Sx1(w) → 6960*(9*w^2 + 4)/(π*(25*w^2 + 16)*(w^4 + 168*w^2 + 13456))
π*(25*w^2 + 16)*(w^4 + 168*w^2 + 13456) simplify → π*(25*w^6 + 4216*w^4 + 339088*w^2 + 215296)
polyroots([215296; 0; 339088; 0; 4216; 0; 25]) = [-4 - 10i; -4 + 10i; -0.8i; 0.8i; 4 + 10i; 4 - 10i]
w1 := 4/5*1i
e1(τ) := e^(1i*w1*τ) → e^(-4*τ/5)
res1(τ) := e1(τ)*limit(Sy1(w)*(w - w1), w → w1) simplify → 23925i*e^(-4*τ/5)/(1042882*π)
w2 := 4 + 10i
e2(τ) := e^(1i*w2*τ) → e^((-10 + 4i)*τ)
res2(τ) := e2(τ)*limit(Sy1(w)*(w - w2), w → w2) simplify → e^((-10 + 4i)*τ)*(-704475/1042882 - 282747/1042882*1i)/π
w3 := -4 + 10i
e3(τ) := e^(1i*w3*τ) → e^((-10 - 4i)*τ)
res3(τ) := e3(τ)*limit(Sy1(w)*(w - w3), w → w3) simplify → e^((-10 - 4i)*τ)*(704475/1042882 - 282747/1042882*1i)/π
JJ1(τ) := 2*π*1i*(res1(τ) + res2(τ) + res3(τ)) simplify → 565494*cos(4*τ)*e^(-10*τ)/521441 - 23925*e^(-4*τ/5)/521441 + 1408950*sin(4*τ)*e^(-10*τ)/521441
JJ1(τ) := Re(JJ1(τ)) → 565494*Re(cos(4*τ)*e^(-10*τ))/521441 - 23925*Re(e^(-4*τ/5))/521441 + 1408950*Re(sin(4*τ)*e^(-10*τ))/521441
Ky1(τ) := JJ1(|τ|) → 565494*cos(4*|τ|)*e^(-10*|τ|)/521441 - 23925*e^(-4*|τ|/5)/521441 + 1408950*sin(4*|τ|)*e^(-10*|τ|)/521441
D1 := Ky1(0) → 861/829 = 1.0386
D11 := 2*integral(Sy1(w), w = 0 .. ∞) = 1.0386
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