ORIGIN := 1
n := 9
x := [36.4; 37.5; 36.9; 37.6; 38.1; 35.5; 37.8; 38.3; 36.6]
y := [36.8; 39.2; 37.6; 39.9; 39.6; 34.2; 36.5; 36.3; 39.8]
z := x - y = [-0.4; -1.7; -0.7; -2.3; -1.5; 1.3; 1.3; 2; -3.2]
B(z) :=
    for i ∈ 1 .. n
        ψ[i] ← 1 if z[i] > 0
        ψ[i] ← 0 if z[i] < 0
    s ← 0
    for i ∈ 1 .. n
        s ← s + 1 if ψ[i] == 1
    s
α := 0.05
α1 := α/2 = 0.025
β := 1 - α1 = 0.975
p := 0.5
b := B(z) = 3
bright := qbinom(β, n, p) = 7
bleft := qbinom(α1, n, p) = 2
zright := qnorm(β, 0, 1) = 1.95996
zleft := -zright = -1.95996
arm := sqrt((4*b + 3)*(1 - p)) - sqrt((4*n - 4*b - 1)*p) = -0.652552
pValue := 1 - pnorm(arm, 0, 1) = 0.742977
statT(x) :=
    n ← rows(x)
    for i ∈ 1 .. n
        y[i] ← x[i]
    for i ∈ 1 .. n - 1
        for j ∈ i + 1 .. n
            a ← y[i]
            if |y[j]| < |y[i]|
                y[i] ← y[j]
                y[j] ← a
    j ← 0
    for i ∈ 1 .. n
        continue if |y[i]| < 10^-5
        j ← j + 1
        ψ[j] ← if(y[i] < 0, 0, 1)
        z[j] ← |y[i]|
    T ← 0
    for i ∈ 1 .. j
        T ← T + ψ[i]*i
    [T; z]
x1 := z
T := statT(x1)[1] = 14
z := statT(x1)[2]
n1 := rows(z) = 9
MT := n1*(n1 + 1)/4 = 22.5
DT := MT*(2*n + 1)/6 = 71.25
T1 := (T - MT)/sqrt(DT) = -1.00699
pValue := 1 - pnorm(T1, 0, 1) = 0.843031
