ORIGIN := 1
m := 1
μ := ln(m)
λ := 1
x1 := rlnorm(1000, μ, λ)
x1 := sort(x1)
f(x) := dlnorm(x, μ, λ)
F(x) := plnorm(x, μ, λ)
x1 =  # no stored result
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i := 0.1, 0.2 .. 0.9
q[i*10] := qlnorm(i, μ, λ)
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m := mean(x1)
m = 1.56401
med := median(x1)
med = 1.01103
D := var(x1)
D = 3.21932
σ := stdev(x1)
σ = 1.79425
xmin := min(x1)
xmax := max(x1)
xmin = 0.0361064
xmax = 16.9385
E := 0.477*sqrt(2)*σ
E = 1.21036
R := xmax - xmin
R = 16.9024
nn := 50
hh := histogram(nn, x1)
hc := R/50
S := sum(hh[:, 2][i]*hc, i = 1 .. 50)
S = 338.047
S2 := sum(hh[:, 2][i]/S*hc, i = 1 .. 50)
S2 = 1
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