ORIGIN := 1
n := 200
a := 2
σ := 1
a := ln(a)
t := rlnorm(n, a, σ)
t1 := sort(t)
Dx := var(t)
Mx := mean(t)
Dx = 17.0238
Mx = 3.18256
t1 = [
    0.109951; 0.116805; 0.130974; 0.201703; 0.23132; 0.262353; 0.294218; 0.32352; 0.367635; 0.370635
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]
t = [
    1.2894; 1.01384; 1.2459; 0.772349; 0.370635; 2.08898; 1.77272; 3.48885; 17.9024; 4.49013
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]
L(aa) := product(1/(t[i]*σ*sqrt(2*π))*e^(-(ln(t[i]) - aa)^2/(2*σ^2)), i = 1 .. n)
LL(aa) := ln(L(aa))
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L(σσ) := product(1/(t[i]*σσ*sqrt(2*π))*e^(-(ln(t[i]) - a)^2/(2*σσ^2)), i = 1 .. n)
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LL(σσ) := ln(L(σσ))
β := 0.95
t1 := qnorm((1 + β)/2, 0, 1)
t1 = 1.95996
ε := sqrt(Dx/n)*t1
Mxl := Mx - ε
Mxr := Mx + ε
Mxl = 2.61074
Mxr = 3.75439
ε1 := sqrt(2/(n - 1)*Dx*t1)
ε1 = 0.579083
Dxl := Dx - ε1
Dxr := Dx + ε1
Dxl = 16.4447
Dxr = 17.6029
t1 := qt((1 + β)/2, n)
t1 = 1.9719
ε := sqrt(Dx/n*t1)
ε = 0.40969
Mxl1 := Mx - ε
Mxrl := Mx + ε
Mxl1 = 2.77287
Mxrl = 3.59225
t1 := qchisq((1 - β)/2, n - 1)
t1 = 161.826
t2 := qchisq((1 + β)/2, n - 1)
t2 = 239.96
Dxl1 := Dx*(n - 1)/t2
Dxr1 := Dx*(n - 1)/t1
Dxl1 = 14.118
Dxr1 = 20.9344
β1 := (1 - β)/2
β2 := (1 + β)/2
k := 5 .. 100
tright(k) := Dx*(k - 1)/qchisq(β2, k - 1)
tleft(k) := Dx*(k - 1)/qchisq(β1, k - 1)
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