ORIGIN := 1
mx1 := 11
my := 12.5
Dx1 := 11
σx1 := sqrt(Dx1)
σx1 = 3.31662
Dy := 14
σy := sqrt(Dy)
σy = 3.74166
nx := 50
ny := 100
NORM := rnorm(nx, mx1, σx1)
NORM1 := rnorm(ny, my, σy)
NORM = [
    11.1982; 9.34809; 11.1865; 8.2804; 10.8433; 10.1659; 11.0637; 16.923; 10.7603; 9.44334
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]
NORM1 = [
    14.1031; 10.7219; 9.89755; 23.9051; 11.4281; 7.71104; 15.3415; 11.0306; 7.99672; 8.6204
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]
α := 0.1
xmean := mean(NORM)
xmean = 10.5938
xright := qnorm(1 - α/2, 0, 1)
xleft := -xright
xleft = -1.64485
xright = 1.64485
zb := (xmean - mx1)/sqrt(Dx1/nx)
zb = -0.865966
Dx := nx/(nx - 1)*var(NORM)
Dx = 11.6541
xright := qt(1 - α, nx - 1)
xright = 1.29907
zb := (xmean - mx1)/sqrt(Dx/nx)
zb = -0.841313
xleft := qchisq(α, nx - 1)
xleft = 36.8182
zb := (nx - 1)*Dx/Dx1
zb = 51.9138
xleft := qnorm(α, 0, 1)
xleft = -1.28155
ymean := mean(NORM1)
ymean = 11.9659
zb := (xmean - ymean)/sqrt(Dx1/nx + Dy/ny)
zb = -2.28675
DY := ny/(ny - 1)*var(NORM1)
DY = 14.5588
xright := qt(1 - α, nx + ny - 2)
xright = 1.2873
zb := (xmean - ymean)/sqrt((1/nx + 1/ny)*((nx - 1)*Dx + (ny - 1)*DY)/(nx + ny - 2))
zb = -2.14825
xleft := qF(α/2, nx - 1, ny - 1)
xleft = 0.653168
xright := qF(1 - α/2, nx - 1, ny - 1)
xright = 1.48167
zb := Dx/DY
zb = 0.800485
