ORIGIN := 1
k := 100
n := 28
x := rt(k, n)
F(x) := pt(x, n)
x = [
    0.382586; 0.337459; 0.101568; 0.563593; -1.03003; -0.210753; -0.0631757; -0.931595; 0.564095; 1.04014
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]
x1 := sort(x) = [
    -2.46179; -2.37606; -2.3238; -2.18561; -1.9983; -1.82334; -1.3534; -1.32967; -1.225; -1.15977
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]
xmin := min(x) = -2.46179
xmax := max(x) = 3.77987
R := xmax - xmin = 6.24167
kinterval := R/10 = 0.624167
p[1] := F(-1.8) = 0.0413225
tn[1] := 6
tn[2] := 8
p[2] := F(-1) - F(-1.8) = 0.121615
tn[3] := 14
p[3] := F(-0.4) - F(-1) = 0.183159
tn[4] := 23
p[4] := F(0.2) - F(-0.4) = 0.232441
tn[5] := 25
p[5] := F(0.8) - F(0.2) = 0.20624
tn[6] := 13
p[6] := F(1.4) - F(0.8) = 0.128975
tn[7] := 6
p[7] := F(2) - F(1.4) = 0.0586057
tn[8] := 5
p[8] := F(4) - F(2) = 0.0274325
Pirson(tn, p, α) :=
    k ← rows(x)
    chi2 ← sum(tn[i]^2/(k*p[i]), i = 1 .. 8) - k
    chi2teor ← qchisq(1 - α, 7)
    if chi2 ≥ chi2teor
        return [
            "гипотеза H0 отвергается с заданным уровнем значимости";
            concat("chi2 = ", num2str(chi2));
            concat("chi2krit = ", num2str(chi2teor))
        ]
    if chi2 < chi2teor
        return [
            "гипотеза H0 принимается с заданным уровнем значимости";
            concat("chi2 = ", num2str(chi2));
            concat("chi2krit = ", num2str(chi2teor))
        ]
Dn(x) :=
    n ← rows(x)
    x1 ← sort(x)
    for i ∈ 1 .. n
        p[i] ← pt(x1[i], 28)
        x1[i] ← i/n - p[i]
        p[i] ← p[i] - (i - 1)/n
    x2 ← stack(x1, p)
    Dn ← max(x2)*sqrt(n)
    Dn
Kolm(x, α) :=
    DN ← Dn(x)
    for i ∈ 1 .. 100
        arg[i] ← 0.1*i
        x1[i] ← 1 + 2*sum((-1)^j*e^(-2*j^2*arg[i]^2), j = 1 .. 200)
    Dkp ← linterp(arg, x1, 1 - α)
    if DN < Dkp
        return [
            "гипотеза H0 принимается с заданным уровнем значимости";
            concat("Dn = ", num2str(DN));
            concat("Dkrit = ", num2str(Dkp))
        ]
    if DN ≥ Dkp
        return [
            "гипотеза H0 отвергается с заданным уровнем значимости";
            concat("Dn = ", num2str(DN));
            concat("Dkrit = ", num2str(Dkp))
        ]
a := Pirson(tn, p, 0.1)
a = ["гипотеза H0 принимается с заданным уровнем значимости"; "chi2 = 6.09791393131837"; "chi2krit = 12.0170366237805"]
b := Kolm(x, 0.1)
b = ["гипотеза H0 отвергается с заданным уровнем значимости"; "Dn = 1.00695713251446"; "Dkrit = 0.607269292059346"]
