ORIGIN := 1
x := [0; 0.05; 0.1; 0.15; 0.2; 0.25; 0.3; 0.35; 0.4; 0.45; 0.5; 0.55]
y := [2.43; 2.67; 2.71; 3.15; 3.47; 3.76; 3.91; 4.46; 4.76; 5.15; 5.54; 5.61]
n := rows(x) = 12
a := intercept(x, y) = 2.25564
b := slope(x, y) = 6.22797
i := 1 .. n
yr[i] := a + b*x[i]
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xmean := mean(x) = 0.275
ymean := mean(y) = 3.96833
dy := var(y) = 1.1692
σy := sqrt(dy) = 1.08129
β1 := 0.9
α1 := 1 - β1 = 0.1
t := qt(1 - α1/2, n - 2) = 1.81246
D1 := 1/(n - 2)*sum((y[k] - yr[k])^2, k = 1 .. n) = 0.0163787
aleft := a - t*sqrt(D1/(n - 2)) = 2.18229
aright := a + t*sqrt(D1/(n - 2)) = 2.32899
εb := sqrt(n/(n - 2)*D1/sum((x[k] - xmean)^2, k = 1 .. n)) = 0.234473
bleft := b - t*εb = 5.803
bright := b + t*εb = 6.65294
i := 1 .. n
ε[i] := y[i] - yr[i]
yleft[i] := yr[i] - t*sqrt(D1/(n - 2)*(1 + n*(x[i] - xmean)^2/sum((x[k] - xmean)^2, k = 1 .. n)))
yright[i] := yr[i] + t*sqrt(D1/(n - 2)*(1 + n*(x[i] - xmean)^2/sum((x[k] - xmean)^2, k = 1 .. n)))
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