ORIGIN := 1
A := [0, 1, -5; -1, -1, -2; 5, -2, -7]
λ := 3
Ds := 8*π
B := [1; 1; 1]
C := [1, 0, 0; 0, 2, 1]
D := [0; 0]
S(w) := Ds/(2*π)*2*λ/(w^2 + λ^2)
r := eigenvals(A) = [-2 + 3i; -2 - 3i; -4]
n := cols(A) = 3
H := identity(n) = [1, 0, 0; 0, 1, 0; 0, 0, 1]
H(p) := p*H - A → [p, -1, 5; 1, p + 1, 2; -5, 2, p + 7]
H1(p) := H(p)^-1 → [
    (p^2 + 8*p + 3)/(p^3 + 8*p^2 + 29*p + 52), (p + 17)/(p^3 + 8*p^2 + 29*p + 52), -(5*p + 7)/(p^3 + 8*p^2 + 29*p + 52);
    -(p + 17)/(p^3 + 8*p^2 + 29*p + 52), (p^2 + 7*p + 25)/(p^3 + 8*p^2 + 29*p + 52), -(2*p - 5)/(p^3 + 8*p^2 + 29*p + 52);
    (5*p + 7)/(p^3 + 8*p^2 + 29*p + 52), -(2*p - 5)/(p^3 + 8*p^2 + 29*p + 52), (p^2 + p + 1)/(p^3 + 8*p^2 + 29*p + 52)
]
H1(p) simplify → [
    (2*p + 4)/(p^2 + 4*p + 13) - 1/(p + 4), (p + 17)/((p + 4)*(p^2 + 4*p + 13)), -(5*p + 7)/((p + 4)*(p^2 + 4*p + 13));
    (p - 1)/(p^2 + 4*p + 13) - 1/(p + 4), 3/(p^2 + 4*p + 13) + 1/(p + 4), -(2*p - 5)/((p + 4)*(p^2 + 4*p + 13));
    (5*p + 7)/((p + 4)*(p^2 + 4*p + 13)), -(2*p - 5)/((p + 4)*(p^2 + 4*p + 13)), 1/(p + 4) - 3/(p^2 + 4*p + 13)
]
W(p) := C*H1(p)*B + D simplify → [1/(p + 4); 3/(p + 4)]
i := sqrt(-1)
W(p) substitute, p == i*w → [1/(4 + w*1i); 3/(4 + w*1i)]
V1(w) := [1/(4 + w*1i); 3/(4 + w*1i)]
V2(w) := [-1/(-4 + w*1i); -3/(-4 + w*1i)]
W(p) substitute, p == -i*w → [-1/(-4 + w*1i); -3/(-4 + w*1i)]
V3(w) := transpose(V2(w)) → [-1/(-4 + w*1i), -3/(-4 + w*1i)]
Spectr(w) := V1(w)*V3(w) → [
    -1/((-4 + w*1i)*(4 + w*1i)), -3/((-4 + w*1i)*(4 + w*1i));
    -3/((-4 + w*1i)*(4 + w*1i)), -9/((-4 + w*1i)*(4 + w*1i))
]
Sy(w) := S(w)*Spectr(w) → [
    -24/((-4 + w*1i)*(4 + w*1i)*(w^2 + 9)), -72/((-4 + w*1i)*(4 + w*1i)*(w^2 + 9));
    -72/((-4 + w*1i)*(4 + w*1i)*(w^2 + 9)), -216/((-4 + w*1i)*(4 + w*1i)*(w^2 + 9))
]
Sy1(w) := Sy(w)[1, 1] → -24/((-4 + w*1i)*(4 + w*1i)*(w^2 + 9)) rectangular → 24/(w^4 + 25*w^2 + 144)
Sy2(w) := Sy(w)[1, 2] → -72/((-4 + w*1i)*(4 + w*1i)*(w^2 + 9)) rectangular → 72/(w^4 + 25*w^2 + 144)
Sy3(w) := Sy(w)[2, 1] → -72/((-4 + w*1i)*(4 + w*1i)*(w^2 + 9)) rectangular → 72/(w^4 + 25*w^2 + 144)
Sy4(w) := Sy(w)[2, 2] → -216/((-4 + w*1i)*(4 + w*1i)*(w^2 + 9)) rectangular → 216/(w^4 + 25*w^2 + 144)
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