ORIGIN := 1
A := [0, 1; -15, -8]
B := [1; 1]
C := [1, 0]
I := identity(2) = [1, 0; 0, 1]
r := eigenvals(A) = [-3; -5]
i := sqrt(-1)
M(p) := p*I - A → [p, -1; 15, p + 8]
N(p) := M(p)^-1 → [
    (p + 8)/(p^2 + 8*p + 15), 1/(p^2 + 8*p + 15);
    -1/(p^2/15 + 8*p/15 + 1), p/(15*(p^2/15 + 8*p/15 + 1))
]
W(p) := C*N(p)*B → 1/(p^2 + 8*p + 15) + (p + 8)/(p^2 + 8*p + 15) simplify → (p + 9)/((p + 3)*(p + 5))
W(p) substitute, p == i*w → (9 + w*1i)/((3 + w*1i)*(5 + w*1i)) simplify → -(-9 + 3i*w)/(w^2 + 9) + (-10 + 2i*w)/(w^2 + 25)
W(p) substitute, p == -i*w → -(-9 + w*1i)/((-3 + w*1i)*(-5 + w*1i)) simplify → (9 + 3i*w)/(w^2 + 9) - (10 + 2i*w)/(w^2 + 25)
V(w) := W(p) substitute, p == i*w → (9 + w*1i)/((3 + w*1i)*(5 + w*1i)) simplify → -(-9 + 3i*w)/(w^2 + 9) + (-10 + 2i*w)/(w^2 + 25)
V1(w) := W(p) substitute, p == -i*w → -(-9 + w*1i)/((-3 + w*1i)*(-5 + w*1i)) simplify → (9 + 3i*w)/(w^2 + 9) - (10 + 2i*w)/(w^2 + 25)
Su := 1
Sy(w) := V(w)*Su*V1(w) → -((-9 + 3i*w)/(w^2 + 9) - (-10 + 2i*w)/(w^2 + 25))*((9 + 3i*w)/(w^2 + 9) - (10 + 2i*w)/(w^2 + 25)) simplify → (w^2 + 81)/((w^2 + 9)*(w^2 + 25))
f1(w) := w^2 + 81 rectangular → w^2 + 81
f2(w) := (w^2 + 9)*(w^2 + 25) rectangular → w^4 + 34*w^2 + 225
f(w) := f1(w)/f2(w) → (w^2 + 81)/(w^4 + 34*w^2 + 225)
integral(f(w), w) → 3*atan(w/3)/2 - 7*atan(w/5)/10
limit(3*atan(w/3)/2 - 7*atan(w/5)/10, w → ∞) → 2*π/5
limit(3*atan(w/3)/2 - 7*atan(w/5)/10, w → -∞) → -2*π/5
Dy := 2*2*π/5 = 2.51327
