ORIGIN := 1
m := 100
λ := 4
x1 := rpois(m, λ) = [
    5; 4; 5; 4; 4; 2; 3; 5; 5; 6
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]
x1 := sort(x1) = [
    1; 1; 1; 1; 1; 1; 1; 2; 2; 2
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]
# Функция плотности вероятности | Функция распределения
f(x) := dpois(x, λ)
F(x) := ppois(x, λ)
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i := 0.1, 0.2 .. 0.9
q[i*10] := qpois(i, λ)
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m := mean(x1) = 4.28
med := median(x1) = 4
D := var(x1) = 3.7216
σ := stdev(x1) = 1.92914
xmin := min(x1) = 1
xmax := max(x1) = 9
R := xmax - xmin = 8
m := 20
L := R/m
i := 1 .. 20
int[i] := xmin + L/2*(2*i - 1)
h := hist(int, x1)
i := 1 .. 19
h[i] := h[i]/100
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