ORIGIN := 1
iy := -1023
t := runif(100, 0, 1)
P := 2^31 = 2147483648
MassUrand(iy, k) :=
    for i ∈ 1 .. k
        u[i] ← Urand(iy)
        iy ← u[i]*P
    u  # error: Эта переменная не определена.
.
