ORIGIN := 1
iy := -1023
t := runif(100, 0, 1)
P := 2^31 = 2147483648
Urand(iy) :=
    m2 ← 1073741824
    halfm ← m2
    mic ← halfm*atan(1.0)
    ib ← mod(mic, 8)
    ib ← mic - ib + 5
    mic ← halfm*(1 - 1/sqrt(3))
    iθ ← mod(mic, 2)
    iθ ← mic - iθ + 1
    s ← 0.5/halfm
    iy ← iy*ib + iθ
    iy ← mod(iy, 2147483648)
    iy ← (iy + m2) + m2 if iy < 0
    iy ← (iy - m2) - m2 if iy/2 > m2
    while iy > 2147483648
        iy ← iy - 2147483648
    u ← iy*s
    u
.
t = [
    0.00126842; 0.193323; 0.585006; 0.350308; 0.822838; 0.174129; 0.710495; 0.303986; 0.0914113; 0.147313
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]
MassUrand(iy, k) :=
    for i ∈ 1 .. k
        u[i] ← Urand(iy)
        iy ← u[i]*P
    u
k := Urand(iy)
k = 0.480162
k1 := Urand(k)
k1 = 0.399884
d := MassUrand(iy, 100)
d = [
    0.480162; 0.0410567; 0.224625; 0.749139; 0.603226; 0.842525; 0.306551; 0.38124; 0.269119; 0.637852
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]
i := 1 .. 100
λ := 5
expRaspred[i] := (-1/λ*ln(d[i]))
expRaspred := sort(expRaspred) = [
    0.00244827; 0.00360302; 0.00710198; 0.00770413; 0.00827034; 0.00841586; 0.0110532; 0.0112595; 0.0120551; 0.016274
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]
mean(expRaspred) = 0.180351
expMIN := min(expRaspred) = 0.00244827
expMAX := max(expRaspred) = 0.890264
R := expMAX - expMIN = 0.887816
median(expRaspred) = 0.131236
D := var(expRaspred) = 0.0319353
σ := stdev(expRaspred) = 0.178705
h := hist(expRaspred)  # error: This function requires at least 2 arguments but is applied to 1.
